# OpenSim document version 40000
Model BootBaan:
  gravity: 0 -9.90665 0
  ConsoleReporter__double_ reporter: report_time_interval=1 [s]
  Ground
  BodySet:
    Body The_rowing_course: mass=1 [kg] mass_center=(0 0 0) inertia=(0 0 0 0 0 0)
      Brick The_rowing_course_geom_1: half_lengths=(40 0.05 5)
    Body TheBoat: mass=1 inertia=(1 1 1 0 0 0)
      Brick TheBoat_geom_1: half_lengths=(6 0.1 0.3)
    Body Stretcher: mass=1 mass_center=(0 0 0) inertia=(0 0 0 0 0 0)
      Brick Stretcher_geom_1: half_lengths=(0.05 0.05 0.3)
    Body Seat: mass=1 mass_center=(0 0 0) inertia=(0 0 0 0 0 0)
      Brick Seat_geom_1: half_lengths=(0.05 0.05 0.3)
    Body PortRigger: mass=1 mass_center=(0 0 0) inertia=(0 0 0 0 0 0)
      Cylinder PortRigger_geom_1: radius=0.02 half_height=0.2610077
    Body PortLock: mass=1 mass_center=(0 0 0) inertia=(0 0 0 0 0 0)
      Cylinder PortLock_geom_1: radius=0.01 half_height=0.025
    Body PortOar: mass=1 mass_center=(0 0 0) inertia=(0 0 0 0 0 0)
      Cylinder PortOar_geom_1: radius=0.02 half_height=1.405
    Body PortBlade: mass=1 mass_center=(0 0 0) inertia=(0 0 0 0 0 0)
      Brick PortBlade_geom_1: half_lengths=(0.02 0.2 0.2)
    Body StarboardRigger: mass=1 mass_center=(0 0 0) inertia=(0 0 0 0 0 0)
      Cylinder StarboardRigger_geom_1: radius=0.02 half_height=0.2610077
    Body StarboardLock: mass=1 mass_center=(0 0 0) inertia=(0 0 0 0 0 0)
      Cylinder StarboardLock_geom_1: radius=0.01 half_height=0.025
    Body StarboardOar: mass=1 mass_center=(0 0 0) inertia=(0 0 0 0 0 0)
      Cylinder StarboardOar_geom_1: radius=0.02 half_height=1.405
    Body StarboardBlade: mass=1 mass_center=(0 0 0) inertia=(0 0 0 0 0 0)
      Brick StarboardBlade_geom_1: half_lengths=(0.02 0.2 0.2)
    Body Lower_leg: mass=1 mass_center=(0 0 0) inertia=(0 0 0 0 0 0)
      Cylinder Lower_leg_geom_1: radius=0.05 half_height=0.265
    Body The_upper_leg: mass=1 mass_center=(0 0 0) inertia=(0 0 0 0 0 0)
      Cylinder The_upper_leg_geom_1: radius=0.05 half_height=0.225
  JointSet:
    WeldJoint courseJoint: socket_parent_frame=ground_offset socket_child_frame=The_rowing_course_offset
      PhysicalOffsetFrame ground_offset: socket_parent=/ground translation=(0 0.025 0) [meters]
      PhysicalOffsetFrame The_rowing_course_offset: socket_parent=/bodyset/The_rowing_course translation=(0 0 0)
    FreeJoint boatJoint: socket_parent_frame=The_rowing_course_offset socket_child_frame=TheBoat_offset
      Coordinate boatJoint_coord_0
      Coordinate boatJoint_coord_1
      Coordinate boatJoint_coord_2
      Coordinate boatJoint_coord_3
      Coordinate boatJoint_coord_4
      Coordinate boatJoint_coord_5
      PhysicalOffsetFrame The_rowing_course_offset: socket_parent=/bodyset/The_rowing_course translation=(0 0.2 0)
      PhysicalOffsetFrame TheBoat_offset: socket_parent=/bodyset/TheBoat translation=(0 0 0)
    WeldJoint stretcherJoint: socket_parent_frame=TheBoat_offset socket_child_frame=Stretcher_offset
      PhysicalOffsetFrame TheBoat_offset: socket_parent=/bodyset/TheBoat translation=(0 0.15 0)
      PhysicalOffsetFrame Stretcher_offset: socket_parent=/bodyset/Stretcher translation=(0 0 0)
    SliderJoint seatJoint: socket_parent_frame=TheBoat_offset socket_child_frame=Seat_offset
      Coordinate seatpos: range=(-0.98 0)
      PhysicalOffsetFrame TheBoat_offset: socket_parent=/bodyset/TheBoat translation=(0.98 0.15 0)
      PhysicalOffsetFrame Seat_offset: socket_parent=/bodyset/Seat translation=(0 0 0)
    WeldJoint portrigJoint: socket_parent_frame=TheBoat_offset socket_child_frame=PortRigger_offset
      PhysicalOffsetFrame TheBoat_offset: socket_parent=/bodyset/TheBoat translation=(0.5 0 0.3)
          orientation=(-1.862253 0 0) [radians]
      PhysicalOffsetFrame PortRigger_offset: socket_parent=/bodyset/PortRigger translation=(0 0.2610077 0)
    PinJoint portlockJoint: socket_parent_frame=PortRigger_offset socket_child_frame=PortLock_offset
      Coordinate plocangle: range=(-1.570796 1.570796)
      PhysicalOffsetFrame PortRigger_offset: socket_parent=/bodyset/PortRigger translation=(0 -0.2610077 0)
          orientation=(0.2914568 0 0)
      PhysicalOffsetFrame PortLock_offset: socket_parent=/bodyset/PortLock translation=(0 0.025 0)
          orientation=(1.570796 0 0)
    PinJoint portoarJoint: socket_parent_frame=PortLock_offset socket_child_frame=PortOar_offset
      Coordinate poarinout: range=(0 0.3)
      PhysicalOffsetFrame PortLock_offset: socket_parent=/bodyset/PortLock translation=(0 0 0)
          orientation=(1.570796 1.570796 0)
      PhysicalOffsetFrame PortOar_offset: socket_parent=/bodyset/PortOar translation=(0 0.575 0)
    PinJoint portbladeJoint: socket_parent_frame=PortOar_offset socket_child_frame=PortBlade_offset
      Coordinate pblpos: range=(-0.3 0)
      PhysicalOffsetFrame PortOar_offset: socket_parent=/bodyset/PortOar translation=(0 -1.005 0)
      PhysicalOffsetFrame PortBlade_offset: socket_parent=/bodyset/PortBlade translation=(0 0.2 0)
    WeldJoint starboardrigJoint: socket_parent_frame=TheBoat_offset socket_child_frame=StarboardRigger_offset
      PhysicalOffsetFrame TheBoat_offset: socket_parent=/bodyset/TheBoat translation=(0.5 0 -0.3)
          orientation=(1.862253 0 0)
      PhysicalOffsetFrame StarboardRigger_offset: socket_parent=/bodyset/StarboardRigger translation=(0 0.2610077 0)
    PinJoint starboardlockJoint: socket_parent_frame=StarboardRigger_offset socket_child_frame=StarboardLock_offset
      Coordinate slocangle: range=(-1.570796 1.570796)
      PhysicalOffsetFrame StarboardRigger_offset: socket_parent=/bodyset/StarboardRigger translation=(0 -0.2610077 0)
          orientation=(-0.2914568 0 0)
      PhysicalOffsetFrame StarboardLock_offset: socket_parent=/bodyset/StarboardLock translation=(0 0.025 0)
          orientation=(-1.570796 0 0)
    PinJoint starboardoarJoint: socket_parent_frame=StarboardLock_offset socket_child_frame=StarboardOar_offset
      Coordinate soarinout: range=(0 0.3)
      PhysicalOffsetFrame StarboardLock_offset: socket_parent=/bodyset/StarboardLock translation=(0 0 0)
          orientation=(-1.570796 -1.570796 0)
      PhysicalOffsetFrame StarboardOar_offset: socket_parent=/bodyset/StarboardOar translation=(0 0.575 0)
    PinJoint starboardbladeJoint: socket_parent_frame=StarboardOar_offset socket_child_frame=StarboardBlade_offset
      Coordinate sblpos: range=(-0.3 0)
      PhysicalOffsetFrame StarboardOar_offset: socket_parent=/bodyset/StarboardOar translation=(0 -1.005 0)
          orientation=(0 0 3.141593)
      PhysicalOffsetFrame StarboardBlade_offset: socket_parent=/bodyset/StarboardBlade translation=(0 -0.2 0)
    PinJoint hip1Joint: socket_parent_frame=Seat_offset socket_child_frame=The_upper_leg_offset
      Coordinate hip1angle: default_value=1.570796 range=(-0.3 1.570796)
      PhysicalOffsetFrame Seat_offset: socket_parent=/bodyset/Seat translation=(0 0.05 0)
      PhysicalOffsetFrame The_upper_leg_offset: socket_parent=/bodyset/The_upper_leg translation=(0 -0.225 0)
    PinJoint knee_Joint: socket_parent_frame=The_upper_leg_offset socket_child_frame=Lower_leg_offset
      Coordinate kneeangle: default_value=-3.141593 range=(-3.141593 -0.2)
      PhysicalOffsetFrame The_upper_leg_offset: socket_parent=/bodyset/The_upper_leg translation=(0 0.225 0)
      PhysicalOffsetFrame Lower_leg_offset: socket_parent=/bodyset/Lower_leg translation=(0 0.265 0)
  ForceSet:
    CoordinateActuator seatact: coordinate=seatpos
    HuntCrossleyForce BoatForce_1: transition_velocity=0.1
      ContactParametersSet contact_parameters:
        ContactParameters: geometry=(corner_1 baantje) stiffness=1000000 dissipation=0.8 static_friction=0.1
            dynamic_friction=0.4 viscous_friction=0.4
    HuntCrossleyForce BoatForce_2: transition_velocity=0.1
      ContactParametersSet contact_parameters:
        ContactParameters: geometry=(corner_2 baantje) stiffness=1000000 dissipation=0.8 static_friction=0.1
            dynamic_friction=0.4 viscous_friction=0.4
    HuntCrossleyForce BoatForce_3: transition_velocity=0.1
      ContactParametersSet contact_parameters:
        ContactParameters: geometry=(corner_3 baantje) stiffness=1000000 dissipation=0.8 static_friction=0.1
            dynamic_friction=0.4 viscous_friction=0.4
    HuntCrossleyForce BoatForce_4: transition_velocity=0.1
      ContactParametersSet contact_parameters:
        ContactParameters: geometry=(corner_4 baantje) stiffness=1000000 dissipation=0.8 static_friction=0.1
            dynamic_friction=0.4 viscous_friction=0.4
    HuntCrossleyForce BladeForce_1: transition_velocity=0.1
      ContactParametersSet contact_parameters:
        ContactParameters: geometry=(pblcorner_1 baantje) stiffness=1000000 dissipation=0.8 static_friction=0.1
            dynamic_friction=0.4 viscous_friction=0.4
    HuntCrossleyForce BladeForce_2: transition_velocity=0.1
      ContactParametersSet contact_parameters:
        ContactParameters: geometry=(pblcorner_2 baantje) stiffness=1000000 dissipation=0.8 static_friction=0.1
            dynamic_friction=0.4 viscous_friction=0.4
    HuntCrossleyForce BladeForce_3: transition_velocity=0.1
      ContactParametersSet contact_parameters:
        ContactParameters: geometry=(pblcorner_3 baantje) stiffness=1000000 dissipation=0.8 static_friction=0.1
            dynamic_friction=0.4 viscous_friction=0.4
    HuntCrossleyForce BladeForce_4: transition_velocity=0.1
      ContactParametersSet contact_parameters:
        ContactParameters: geometry=(pblcorner_4 baantje) stiffness=1000000 dissipation=0.8 static_friction=0.1
            dynamic_friction=0.4 viscous_friction=0.4
    HuntCrossleyForce SBladeForce_1: transition_velocity=0.1
      ContactParametersSet contact_parameters:
        ContactParameters: geometry=(sblcorner_1 baantje) stiffness=1000000 dissipation=0.8 static_friction=0.1
            dynamic_friction=0.4 viscous_friction=0.4
    HuntCrossleyForce SBladeForce_2: transition_velocity=0.1
      ContactParametersSet contact_parameters:
        ContactParameters: geometry=(sblcorner_2 baantje) stiffness=1000000 dissipation=0.8 static_friction=0.1
            dynamic_friction=0.4 viscous_friction=0.4
    HuntCrossleyForce SBladeForce_3: transition_velocity=0.1
      ContactParametersSet contact_parameters:
        ContactParameters: geometry=(sblcorner_3 baantje) stiffness=1000000 dissipation=0.8 static_friction=0.1
            dynamic_friction=0.4 viscous_friction=0.4
    HuntCrossleyForce SBladeForce_4: transition_velocity=0.1
      ContactParametersSet contact_parameters:
        ContactParameters: geometry=(sblcorner_4 baantje) stiffness=1000000 dissipation=0.8 static_friction=0.1
            dynamic_friction=0.4 viscous_friction=0.4
  ContactGeometrySet:
    ContactHalfSpace baantje: socket_frame=/bodyset/The_rowing_course location=(0 0 0) orientation=(0 0 -1.570796)
    ContactSphere corner_1: socket_frame=/bodyset/TheBoat location=(6 -0.1 -0.3) radius=0.1
    ContactSphere corner_2: socket_frame=/bodyset/TheBoat location=(-6 -0.1 -0.3) radius=0.1
    ContactSphere corner_3: socket_frame=/bodyset/TheBoat location=(6 -0.1 0.3) radius=0.1
    ContactSphere corner_4: socket_frame=/bodyset/TheBoat location=(-6 -0.1 0.3) radius=0.1
    ContactSphere pblcorner_1: socket_frame=/bodyset/PortBlade location=(0 0.2 0.2) radius=0.05
    ContactSphere pblcorner_2: socket_frame=/bodyset/PortBlade location=(0 0.2 -0.2) radius=0.05
    ContactSphere pblcorner_3: socket_frame=/bodyset/PortBlade location=(0 -0.2 0.2) radius=0.05
    ContactSphere pblcorner_4: socket_frame=/bodyset/PortBlade location=(0 -0.2 -0.2) radius=0.05
    ContactSphere sblcorner_1: socket_frame=/bodyset/StarboardBlade location=(0 0.2 0.2) radius=0.05
    ContactSphere sblcorner_2: socket_frame=/bodyset/StarboardBlade location=(0 0.2 -0.2) radius=0.05
    ContactSphere sblcorner_3: socket_frame=/bodyset/StarboardBlade location=(0 -0.2 0.2) radius=0.05
    ContactSphere sblcorner_4: socket_frame=/bodyset/StarboardBlade location=(0 -0.2 -0.2) radius=0.05
