# OpenSim document version 40000
Model BootBaan:
  gravity: 0 -9.90665 0
  ConsoleReporter__double_ reporter: report_time_interval=1 [s]
  Ground
  BodySet:
    Body The_rowing_course: mass=1 [kg] mass_center=(0 0 0) inertia=(0 0 0 0 0 0)
      Brick The_rowing_course_geom_1: half_lengths=(40 0.05 5)
    Body TheBoat: mass=10 inertia=(1 1 1 0 0 0)
      Brick TheBoat_geom_1: half_lengths=(6 0.1 0.3)
    Body Stretcher: mass=1 mass_center=(0 0 0) inertia=(0 0 0 0 0 0)
      Brick Stretcher_geom_1: half_lengths=(0.05 0.05 0.3)
    Body Seat: mass=1 mass_center=(0 0 0) inertia=(0 0 0 0 0 0)
      Brick Seat_geom_1: half_lengths=(0.05 0.05 0.3)
    Body Bow: mass=0.1 mass_center=(0 0 0) inertia=(0 0 0 0 0 0)
      Sphere Bow_geom_1: radius=0.05
    Body PortRigger: mass=1 mass_center=(0 0 0) inertia=(0 0 0 0 0 0)
      Cylinder PortRigger_geom_1: radius=0.02 half_height=0.2610077
    Body PortLock: mass=1 mass_center=(0 0 0) inertia=(0 0 0 0 0 0)
      Cylinder PortLock_geom_1: radius=0.01 half_height=0.025
    Body PortOar: mass=1 mass_center=(0 0 0) inertia=(0 0 0 0 0 0)
      Cylinder PortOar_geom_1: radius=0.02 half_height=1.405
    Body PortBlade: mass=1 mass_center=(0 0 0) inertia=(0 0 0 0 0 0)
      Brick PortBlade_geom_1: half_lengths=(0.02 0.2 0.2)
    Body StarboardRigger: mass=1 mass_center=(0 0 0) inertia=(0 0 0 0 0 0)
      Cylinder StarboardRigger_geom_1: radius=0.02 half_height=0.2610077
    Body StarboardLock: mass=1 mass_center=(0 0 0) inertia=(0 0 0 0 0 0)
      Cylinder StarboardLock_geom_1: radius=0.01 half_height=0.025
    Body StarboardOar: mass=1 mass_center=(0 0 0) inertia=(0 0 0 0 0 0)
      Cylinder StarboardOar_geom_1: radius=0.02 half_height=1.405
    Body StarboardBlade: mass=1 mass_center=(0 0 0) inertia=(0 0 0 0 0 0)
      Brick StarboardBlade_geom_1: half_lengths=(0.02 0.2 0.2)
    Body Lower_leg: mass=8 mass_center=(0 0 0) inertia=(0 0 0 0 0 0)
      Cylinder Lower_leg_geom_1: radius=0.05 half_height=0.2697
    Body The_upper_leg: mass=8 mass_center=(0 0 0) inertia=(0 0 0 0 0 0)
      Cylinder The_upper_leg_geom_1: radius=0.05 half_height=0.2697
    Body The_lower_back: mass=16 mass_center=(0 0 0) inertia=(0 0 0 0 0 0)
      Brick The_lower_back_geom_1: half_lengths=(0.04 0.093 0.08)
    Body The_upper_back: mass=16 mass_center=(0 0 0) inertia=(0 0 0 0 0 0)
      Brick The_upper_back_geom_1: half_lengths=(0.05 0.2418 0.1)
    Body Shoulder: mass=8 mass_center=(0 0 0) inertia=(0 0 0 0 0 0)
      Brick Shoulder_geom_1: half_lengths=(0.04 0.04 0.3999)
    Body Head: mass=8 mass_center=(0 0 0) inertia=(0 0 0 0 0 0)
      Brick Head_geom_1: half_lengths=(0.04 0.1395 0.1395)
    Body Upper_Arm_Left: mass=4 mass_center=(0 0 0) inertia=(0 0 0 0 0 0)
      Brick Upper_Arm_Left_geom_1: half_lengths=(0.04 0.1674 0.04)
  JointSet:
    WeldJoint courseJoint: socket_parent_frame=ground_offset socket_child_frame=The_rowing_course_offset
      PhysicalOffsetFrame ground_offset: socket_parent=/ground translation=(0 0.025 0) [meters]
      PhysicalOffsetFrame The_rowing_course_offset: socket_parent=/bodyset/The_rowing_course translation=(0 0 0)
    FreeJoint boatJoint: socket_parent_frame=The_rowing_course_offset socket_child_frame=TheBoat_offset
      Coordinate boatJoint_coord_0
      Coordinate boatJoint_coord_1
      Coordinate boatJoint_coord_2
      Coordinate boatJoint_coord_3
      Coordinate boatJoint_coord_4
      Coordinate boatJoint_coord_5
      PhysicalOffsetFrame The_rowing_course_offset: socket_parent=/bodyset/The_rowing_course translation=(0 0.2 0)
      PhysicalOffsetFrame TheBoat_offset: socket_parent=/bodyset/TheBoat translation=(0 0 0)
    WeldJoint stretcherJoint: socket_parent_frame=TheBoat_offset socket_child_frame=Stretcher_offset
      PhysicalOffsetFrame TheBoat_offset: socket_parent=/bodyset/TheBoat translation=(0 0.1 0)
      PhysicalOffsetFrame Stretcher_offset: socket_parent=/bodyset/Stretcher translation=(0 0 0)
    SliderJoint seatJoint: socket_parent_frame=TheBoat_offset socket_child_frame=Seat_offset
      Coordinate seatpos: range=(-1.0788 0)
      PhysicalOffsetFrame TheBoat_offset: socket_parent=/bodyset/TheBoat translation=(1.0788 0.15 0)
      PhysicalOffsetFrame Seat_offset: socket_parent=/bodyset/Seat translation=(0 0 0)
    WeldJoint bowJoint: socket_parent_frame=TheBoat_offset socket_child_frame=Bow_offset
      PhysicalOffsetFrame TheBoat_offset: socket_parent=/bodyset/TheBoat translation=(6 0.1 0)
      PhysicalOffsetFrame Bow_offset: socket_parent=/bodyset/Bow translation=(0 0 0)
    WeldJoint portrigJoint: socket_parent_frame=TheBoat_offset socket_child_frame=PortRigger_offset
      PhysicalOffsetFrame TheBoat_offset: socket_parent=/bodyset/TheBoat translation=(0.5 0 0.3)
          orientation=(-1.862253 0 0) [radians]
      PhysicalOffsetFrame PortRigger_offset: socket_parent=/bodyset/PortRigger translation=(0 0.2610077 0)
    PinJoint portlockJoint: socket_parent_frame=PortRigger_offset socket_child_frame=PortLock_offset
      Coordinate plocangle: range=(-1.570796 1.570796)
      PhysicalOffsetFrame PortRigger_offset: socket_parent=/bodyset/PortRigger translation=(0 -0.2610077 0)
          orientation=(0.2914568 0 0)
      PhysicalOffsetFrame PortLock_offset: socket_parent=/bodyset/PortLock translation=(0 0.025 0)
          orientation=(1.570796 0 0)
    PinJoint portoarJoint: socket_parent_frame=PortLock_offset socket_child_frame=PortOar_offset
      Coordinate poarinout: range=(0 0.3)
      PhysicalOffsetFrame PortLock_offset: socket_parent=/bodyset/PortLock translation=(0 0 0)
          orientation=(1.570796 1.570796 0)
      PhysicalOffsetFrame PortOar_offset: socket_parent=/bodyset/PortOar translation=(0 0.575 0)
    PinJoint portbladeJoint: socket_parent_frame=PortOar_offset socket_child_frame=PortBlade_offset
      Coordinate pblpos: range=(-0.3 0)
      PhysicalOffsetFrame PortOar_offset: socket_parent=/bodyset/PortOar translation=(0 -1.005 0)
      PhysicalOffsetFrame PortBlade_offset: socket_parent=/bodyset/PortBlade translation=(0 0.2 0)
    WeldJoint starboardrigJoint: socket_parent_frame=TheBoat_offset socket_child_frame=StarboardRigger_offset
      PhysicalOffsetFrame TheBoat_offset: socket_parent=/bodyset/TheBoat translation=(0.5 0 -0.3)
          orientation=(1.862253 0 0)
      PhysicalOffsetFrame StarboardRigger_offset: socket_parent=/bodyset/StarboardRigger translation=(0 0.2610077 0)
    PinJoint starboardlockJoint: socket_parent_frame=StarboardRigger_offset socket_child_frame=StarboardLock_offset
      Coordinate slocangle: range=(-1.570796 1.570796)
      PhysicalOffsetFrame StarboardRigger_offset: socket_parent=/bodyset/StarboardRigger translation=(0 -0.2610077 0)
          orientation=(-0.2914568 0 0)
      PhysicalOffsetFrame StarboardLock_offset: socket_parent=/bodyset/StarboardLock translation=(0 0.025 0)
          orientation=(-1.570796 0 0)
    PinJoint starboardoarJoint: socket_parent_frame=StarboardLock_offset socket_child_frame=StarboardOar_offset
      Coordinate soarinout: range=(0 0.3)
      PhysicalOffsetFrame StarboardLock_offset: socket_parent=/bodyset/StarboardLock translation=(0 0 0)
          orientation=(-1.570796 -1.570796 0)
      PhysicalOffsetFrame StarboardOar_offset: socket_parent=/bodyset/StarboardOar translation=(0 0.575 0)
    PinJoint starboardbladeJoint: socket_parent_frame=StarboardOar_offset socket_child_frame=StarboardBlade_offset
      Coordinate sblpos: range=(-0.3 0)
      PhysicalOffsetFrame StarboardOar_offset: socket_parent=/bodyset/StarboardOar translation=(0 -1.005 0)
          orientation=(0 0 3.141593)
      PhysicalOffsetFrame StarboardBlade_offset: socket_parent=/bodyset/StarboardBlade translation=(0 -0.2 0)
    PinJoint hipJoint: socket_parent_frame=Seat_offset socket_child_frame=The_upper_leg_offset
      Coordinate hipangle: range=(-0.3 1.570796)
      PhysicalOffsetFrame Seat_offset: socket_parent=/bodyset/Seat translation=(0 0.05 0)
      PhysicalOffsetFrame The_upper_leg_offset: socket_parent=/bodyset/The_upper_leg translation=(0 -0.2697 0)
    PinJoint knee_Joint: socket_parent_frame=The_upper_leg_offset socket_child_frame=Lower_leg_offset
      Coordinate kneeangle: range=(0.2 3.141593)
      PhysicalOffsetFrame The_upper_leg_offset: socket_parent=/bodyset/The_upper_leg translation=(0 0.2697 0)
          orientation=(-3.141593 1.224647e-16 -3.141593)
      PhysicalOffsetFrame Lower_leg_offset: socket_parent=/bodyset/Lower_leg translation=(0 0.2697 0)
    PinJoint lbackJoint: socket_parent_frame=Seat_offset socket_child_frame=The_lower_back_offset
      Coordinate lbackangle: range=(-1.570796 0.3)
      PhysicalOffsetFrame Seat_offset: socket_parent=/bodyset/Seat translation=(0 0.05 0)
      PhysicalOffsetFrame The_lower_back_offset: socket_parent=/bodyset/The_lower_back translation=(0 -0.093 0)
    WeldJoint ubackJoint: socket_parent_frame=The_lower_back_offset socket_child_frame=The_upper_back_offset
      PhysicalOffsetFrame The_lower_back_offset: socket_parent=/bodyset/The_lower_back translation=(0 0.093 0)
          orientation=(0 0 0.3)
      PhysicalOffsetFrame The_upper_back_offset: socket_parent=/bodyset/The_upper_back translation=(0 -0.2418 0)
    WeldJoint shoulderJoint: socket_parent_frame=The_upper_back_offset socket_child_frame=Shoulder_offset
      PhysicalOffsetFrame The_upper_back_offset: socket_parent=/bodyset/The_upper_back translation=(0 0.2418 0)
      PhysicalOffsetFrame Shoulder_offset: socket_parent=/bodyset/Shoulder translation=(0 -0.04 0)
    WeldJoint headJoint: socket_parent_frame=Shoulder_offset socket_child_frame=Head_offset
      PhysicalOffsetFrame Shoulder_offset: socket_parent=/bodyset/Shoulder translation=(0 0.04 0)
      PhysicalOffsetFrame Head_offset: socket_parent=/bodyset/Head translation=(0 -0.1395 0)
    BallJoint upper_arm_left_Joint: socket_parent_frame=Shoulder_offset socket_child_frame=Upper_Arm_Left_offset
      Coordinate upper_arm_left_Joint_coord_0
      Coordinate upper_arm_left_Joint_coord_1
      Coordinate upper_arm_left_Joint_coord_2
      PhysicalOffsetFrame Shoulder_offset: socket_parent=/bodyset/Shoulder translation=(0 0 0.3999)
          orientation=(0 0 1.570796)
      PhysicalOffsetFrame Upper_Arm_Left_offset: socket_parent=/bodyset/Upper_Arm_Left translation=(0 -0.1674 0)
  ForceSet:
    HuntCrossleyForce boatcorner_1: transition_velocity=0.1
      ContactParametersSet contact_parameters:
        ContactParameters: geometry=(boatcorner_1 baantje) stiffness=1000000 dissipation=0.8 static_friction=0.1
            dynamic_friction=0.4 viscous_friction=0.4
    HuntCrossleyForce boatcorner_2: transition_velocity=0.1
      ContactParametersSet contact_parameters:
        ContactParameters: geometry=(boatcorner_2 baantje) stiffness=1000000 dissipation=0.8 static_friction=0.1
            dynamic_friction=0.4 viscous_friction=0.4
    HuntCrossleyForce boatcorner_3: transition_velocity=0.1
      ContactParametersSet contact_parameters:
        ContactParameters: geometry=(boatcorner_3 baantje) stiffness=1000000 dissipation=0.8 static_friction=0.1
            dynamic_friction=0.4 viscous_friction=0.4
    HuntCrossleyForce boatcorner_4: transition_velocity=0.1
      ContactParametersSet contact_parameters:
        ContactParameters: geometry=(boatcorner_4 baantje) stiffness=1000000 dissipation=0.8 static_friction=0.1
            dynamic_friction=0.4 viscous_friction=0.4
    HuntCrossleyForce pblcorner_1: transition_velocity=0.1
      ContactParametersSet contact_parameters:
        ContactParameters: geometry=(pblcorner_1 baantje) stiffness=1000000 dissipation=0.8 static_friction=0.1
            dynamic_friction=0.4 viscous_friction=0.4
    HuntCrossleyForce pblcorner_2: transition_velocity=0.1
      ContactParametersSet contact_parameters:
        ContactParameters: geometry=(pblcorner_2 baantje) stiffness=1000000 dissipation=0.8 static_friction=0.1
            dynamic_friction=0.4 viscous_friction=0.4
    HuntCrossleyForce pblcorner_3: transition_velocity=0.1
      ContactParametersSet contact_parameters:
        ContactParameters: geometry=(pblcorner_3 baantje) stiffness=1000000 dissipation=0.8 static_friction=0.1
            dynamic_friction=0.4 viscous_friction=0.4
    HuntCrossleyForce pblcorner_4: transition_velocity=0.1
      ContactParametersSet contact_parameters:
        ContactParameters: geometry=(pblcorner_4 baantje) stiffness=1000000 dissipation=0.8 static_friction=0.1
            dynamic_friction=0.4 viscous_friction=0.4
    HuntCrossleyForce sblcorner_1: transition_velocity=0.1
      ContactParametersSet contact_parameters:
        ContactParameters: geometry=(sblcorner_1 baantje) stiffness=1000000 dissipation=0.8 static_friction=0.1
            dynamic_friction=0.4 viscous_friction=0.4
    HuntCrossleyForce sblcorner_2: transition_velocity=0.1
      ContactParametersSet contact_parameters:
        ContactParameters: geometry=(sblcorner_2 baantje) stiffness=1000000 dissipation=0.8 static_friction=0.1
            dynamic_friction=0.4 viscous_friction=0.4
    HuntCrossleyForce sblcorner_3: transition_velocity=0.1
      ContactParametersSet contact_parameters:
        ContactParameters: geometry=(sblcorner_3 baantje) stiffness=1000000 dissipation=0.8 static_friction=0.1
            dynamic_friction=0.4 viscous_friction=0.4
    HuntCrossleyForce sblcorner_4: transition_velocity=0.1
      ContactParametersSet contact_parameters:
        ContactParameters: geometry=(sblcorner_4 baantje) stiffness=1000000 dissipation=0.8 static_friction=0.1
            dynamic_friction=0.4 viscous_friction=0.4
    HuntCrossleyForce knee: transition_velocity=0.1
      ContactParametersSet contact_parameters:
        ContactParameters: geometry=(knee baantje) stiffness=1000000 dissipation=0.8 static_friction=0.1
            dynamic_friction=0.4 viscous_friction=0.4
  ContactGeometrySet:
    ContactHalfSpace baantje: socket_frame=/bodyset/The_rowing_course location=(0 0 0) orientation=(0 0 -1.570796)
    ContactSphere boatcorner_1: socket_frame=/bodyset/TheBoat location=(6 -0.1 -0.3) radius=0.1
    ContactSphere boatcorner_2: socket_frame=/bodyset/TheBoat location=(-6 -0.1 -0.3) radius=0.1
    ContactSphere boatcorner_3: socket_frame=/bodyset/TheBoat location=(6 -0.1 0.3) radius=0.1
    ContactSphere boatcorner_4: socket_frame=/bodyset/TheBoat location=(-6 -0.1 0.3) radius=0.1
    ContactSphere pblcorner_1: socket_frame=/bodyset/PortBlade location=(0 0.2 0.2) radius=0.05
    ContactSphere pblcorner_2: socket_frame=/bodyset/PortBlade location=(0 0.2 -0.2) radius=0.05
    ContactSphere pblcorner_3: socket_frame=/bodyset/PortBlade location=(0 -0.2 0.2) radius=0.05
    ContactSphere pblcorner_4: socket_frame=/bodyset/PortBlade location=(0 -0.2 -0.2) radius=0.05
    ContactSphere sblcorner_1: socket_frame=/bodyset/StarboardBlade location=(0 0.2 0.2) radius=0.05
    ContactSphere sblcorner_2: socket_frame=/bodyset/StarboardBlade location=(0 0.2 -0.2) radius=0.05
    ContactSphere sblcorner_3: socket_frame=/bodyset/StarboardBlade location=(0 -0.2 0.2) radius=0.05
    ContactSphere sblcorner_4: socket_frame=/bodyset/StarboardBlade location=(0 -0.2 -0.2) radius=0.05
    ContactSphere knee: socket_frame=/bodyset/Lower_leg location=(-0.3 0.2697 0) radius=0.02
