# OpenSim document version 40000
Model Trajectory:
  gravity: 0 -9.90665 0
  ConsoleReporter__double_ reporter: report_time_interval=1 [s]
  Ground
  BodySet:
    Body TheBoat: mass=10 [kg] inertia=(1 1 1 0 0 0)
      Brick TheBoat_geom_1: half_lengths=(3 0.1 0.3)
    Body Stretcher: mass=1 mass_center=(0 0 0) inertia=(1 1 1 0 0 0)
      Brick Stretcher_geom_1: half_lengths=(0.05 0.05 0.3)
    Body Seat: mass=1 mass_center=(0 0 0) inertia=(1 1 1 0 0 0)
      Brick Seat_geom_1: half_lengths=(0.05 0.05 0.3)
    Body Lower_leg_lower: mass=4 mass_center=(0 0 0) inertia=(1 1 1 0 0 0)
      Cylinder Lower_leg_lower_geom_1: radius=0.05 half_height=0.12555
    Body Lower_leg_upper: mass=4 mass_center=(0 0 0) inertia=(1 1 1 0 0 0)
      Cylinder Lower_leg_upper_geom_1: radius=0.05 half_height=0.12555
    Body Upper_leg: mass=8 mass_center=(0 0 0) inertia=(1 1 1 0 0 0)
      Cylinder Upper_leg_geom_1: radius=0.05 half_height=0.2139
  JointSet:
    CustomJoint boatJoint: socket_parent_frame=ground_offset socket_child_frame=TheBoat_offset
      Coordinate bJoint_1
      Coordinate bJoint_3
      Coordinate bJoint_4
      PhysicalOffsetFrame ground_offset: socket_parent=/ground translation=(0 0.1 0) [meters]
      PhysicalOffsetFrame TheBoat_offset: socket_parent=/bodyset/TheBoat translation=(0 0 0)
      SpatialTransform:
        TransformAxis rotation1: axis=(1 0 0)
        TransformAxis rotation2: coordinates=bJoint_1 axis=(0 1 0) LinearFunction(coefficients=1 0)
        TransformAxis rotation3: axis=(0 0 1)
        TransformAxis translation1: coordinates=bJoint_3 axis=(1 0 0) LinearFunction(coefficients=1 0)
        TransformAxis translation2: coordinates=bJoint_4 axis=(0 1 0) LinearFunction(coefficients=1 0)
        TransformAxis translation3: axis=(0 0 1)
    WeldJoint stretcherJoint: socket_parent_frame=TheBoat_offset socket_child_frame=Stretcher_offset
      PhysicalOffsetFrame TheBoat_offset: socket_parent=/bodyset/TheBoat translation=(0 0.1 0)
      PhysicalOffsetFrame Stretcher_offset: socket_parent=/bodyset/Stretcher translation=(0 0 0)
    SliderJoint seatJoint: socket_parent_frame=TheBoat_offset socket_child_frame=Seat_offset
      Coordinate seatpos: range=(-0.93 0)
      PhysicalOffsetFrame TheBoat_offset: socket_parent=/bodyset/TheBoat translation=(0.9270883 0.2 0)
      PhysicalOffsetFrame Seat_offset: socket_parent=/bodyset/Seat translation=(0 0 0)
    PinJoint hipJoint: socket_parent_frame=Seat_offset socket_child_frame=Upper_leg_offset
      Coordinate hipangle: range=(-0.3 1.670796) clamped=true
      PhysicalOffsetFrame Seat_offset: socket_parent=/bodyset/Seat translation=(0 0.05 0)
      PhysicalOffsetFrame Upper_leg_offset: socket_parent=/bodyset/Upper_leg translation=(0 -0.2139 0)
    PinJoint knee_Joint: socket_parent_frame=Upper_leg_offset socket_child_frame=Lower_leg_upper_offset
      Coordinate kneeangle: range=(0 3.141593) clamped=true
      PhysicalOffsetFrame Upper_leg_offset: socket_parent=/bodyset/Upper_leg translation=(0 0.2139 0)
      PhysicalOffsetFrame Lower_leg_upper_offset: socket_parent=/bodyset/Lower_leg_upper translation=(0 -0.12555 0)
    PinJoint foot_Joint: socket_parent_frame=Stretcher_offset socket_child_frame=Lower_leg_lower_offset
      Coordinate footangle: range=(0 1.570796) clamped=true
      PhysicalOffsetFrame Stretcher_offset: socket_parent=/bodyset/Stretcher translation=(0 0.05 0)
          orientation=(0 0 1.570796) [radians]
      PhysicalOffsetFrame Lower_leg_lower_offset: socket_parent=/bodyset/Lower_leg_lower translation=(0 0.12555 0)
  ConstraintSet:
    WeldConstraint legconstraint: socket_frame1=Lower_leg_lower_offset socket_frame2=Lower_leg_upper_offset
      PhysicalOffsetFrame Lower_leg_lower_offset: socket_parent=/bodyset/Lower_leg_lower translation=(0 -0.12555 0)
      PhysicalOffsetFrame Lower_leg_upper_offset: socket_parent=/bodyset/Lower_leg_upper translation=(0 0.12555 0)
  ForceSet:
    CoordinateActuator bJ_act_1: coordinate=bJoint_1
    CoordinateActuator bJ_act_3: coordinate=bJoint_3
    CoordinateActuator bJ_act_4: coordinate=bJoint_4
    CoordinateActuator seatact: coordinate=seatpos
    CoordinateActuator hipact: coordinate=hipangle
    CoordinateActuator kneeact: coordinate=kneeangle
    CoordinateActuator footact: coordinate=footangle
  MarkerSet:
    Marker mSeat: Seat (0 0 0)
