# OpenSim document version 20302
CMC_TaskSet bootbaan_CMC:
  defaults: CMC_Joint default: weight=(1 1 1) wrt_body=-1 express_body=-1 active=(true false false) kp=(1 1 1)
      kv=(1 1 1) ka=(1 1 1) r0=(0 0 0) r1=(0 0 0) r2=(0 0 0) limit=0
  # Most use default values
  CMC_Joint bJoint_1: coordinate=bJoint_1
  CMC_Joint bJoint_3: coordinate=bJoint_3
  CMC_Joint bJoint_4: coordinate=bJoint_4
  CMC_Joint seatpos: coordinate=seatpos
  CMC_Joint hipangle: coordinate=hipangle
  CMC_Joint kneeangle: coordinate=kneeangle
  CMC_Joint footangle: coordinate=footangle
