# OpenSim document version 40000
Model BootBaan:
  gravity: 0 -9.90665 0
  ConsoleReporter__double_ reporter: report_time_interval=1 [s]
  Ground
  BodySet:
    Body Seat: mass=1 [kg] mass_center=(0 0 0) inertia=(1 1 1 0 0 0)
      Brick Seat_geom_1: half_lengths=(0.05 0.05 0.3)
    Body Lower_back: mass=16 mass_center=(0 0 0) inertia=(1 1 1 0 0 0)
      Brick Lower_back_geom_1: half_lengths=(0.04 0.093 0.08)
    Body Upper_back: mass=16 mass_center=(0 0 0) inertia=(1 1 1 0 0 0)
      Brick Upper_back_geom_1: half_lengths=(0.05 0.2139 0.1)
    Body Shoulder: mass=8 mass_center=(0 0 0) inertia=(1 1 1 0 0 0)
      Brick Shoulder_geom_1: half_lengths=(0.0465 0.0465 0.2325)
    Body Upper_Arm_Left: mass=4 mass_center=(0 0 0) inertia=(1 1 1 0 0 0)
      Brick Upper_Arm_Left_geom_1: half_lengths=(0.04 0.1395 0.04)
  JointSet:
    SliderJoint seatJoint: socket_parent_frame=ground_offset socket_child_frame=Seat_offset
      Coordinate seatpos: default_value=-0.007375761 range=(-0.93 0)
      PhysicalOffsetFrame ground_offset: socket_parent=/ground translation=(0.9270883 0.3 0) [meters]
      PhysicalOffsetFrame Seat_offset: socket_parent=/bodyset/Seat translation=(0 0 0)
    PinJoint lbackJoint: socket_parent_frame=Seat_offset socket_child_frame=Lower_back_offset
      Coordinate lbackangle: default_value=-0.7681194 range=(-1.570796 0.3) clamped=true
      PhysicalOffsetFrame Seat_offset: socket_parent=/bodyset/Seat translation=(0 0.05 0)
      PhysicalOffsetFrame Lower_back_offset: socket_parent=/bodyset/Lower_back translation=(0 -0.093 0)
    WeldJoint ubackJoint: socket_parent_frame=Lower_back_offset socket_child_frame=Upper_back_offset
      PhysicalOffsetFrame Lower_back_offset: socket_parent=/bodyset/Lower_back translation=(0 0.093 0)
          orientation=(0 0 0.3) [radians]
      PhysicalOffsetFrame Upper_back_offset: socket_parent=/bodyset/Upper_back translation=(0 -0.2139 0)
    WeldJoint shoulderJoint: socket_parent_frame=Upper_back_offset socket_child_frame=Shoulder_offset
      PhysicalOffsetFrame Upper_back_offset: socket_parent=/bodyset/Upper_back translation=(0 0.2139 0)
      PhysicalOffsetFrame Shoulder_offset: socket_parent=/bodyset/Shoulder translation=(0 -0.0465 0)
    BallJoint upper_arm_left_Joint: socket_parent_frame=Shoulder_offset socket_child_frame=Upper_Arm_Left_offset
      Coordinate uarmleft_out: default_value=-0.2490585
      Coordinate uarmleft_trn: default_value=-0.2806489
      Coordinate uarmleft_up: default_value=0.8011061
      PhysicalOffsetFrame Shoulder_offset: socket_parent=/bodyset/Shoulder translation=(0 0 0.2325)
          orientation=(0 0 1.570796)
      PhysicalOffsetFrame Upper_Arm_Left_offset: socket_parent=/bodyset/Upper_Arm_Left translation=(0 -0.1395 0)
  ForceSet:
    CoordinateActuator seatact: coordinate=seatpos
    CoordinateActuator lbackact: coordinate=lbackangle
    CoordinateActuator ualo_act: coordinate=uarmleft_out
    CoordinateActuator ualt_act: coordinate=uarmleft_trn
    CoordinateActuator ualu_act: coordinate=uarmleft_up
  MarkerSet:
    Marker mSeat: Seat (0 0 0)
    Marker mShoulder: Shoulder (0 0 0)
    Marker msElbow: Upper_Arm_Left (0 0.1395 0)
