# OpenSim document version 20302
CMC_TaskSet bootbaan_CMC:
  defaults: CMC_Joint default: on=false weight=(1 1 1) wrt_body=-1 express_body=-1 active=(true false false)
      kp=(100 1 1) kv=(20 1 1) ka=(1 1 1) r0=(0 0 0) r1=(0 0 0) r2=(0 0 0) limit=0
  # Most use default values
  CMC_Joint seatpos: weight=(10000 1 1) coordinate=seatpos
  CMC_Joint hipangle: weight=(1000 1 1) coordinate=hipangle
  CMC_Joint kneeangle: weight=(1000 1 1) coordinate=kneeangle
  CMC_Joint footangle: weight=(1 1 1) coordinate=footangle
  CMC_Joint lbackangle: weight=(10000 1 1) coordinate=lbackangle
  CMC_Joint uarmleft_out: weight=(10000 1 1) coordinate=uarmleft_out
  CMC_Joint uarmleft_trn: weight=(10000 1 1) coordinate=uarmleft_trn
  CMC_Joint uarmleft_up: weight=(10000 1 1) coordinate=uarmleft_up
  CMC_Joint uarmright_out: weight=(10000 1 1) coordinate=uarmright_out
  CMC_Joint uarmright_trn: weight=(10000 1 1) coordinate=uarmright_trn
  CMC_Joint uarmright_up: weight=(10000 1 1) coordinate=uarmright_up
