# OpenSim document version 40000
Model RowTheBoat::
  gravity: 0 -9.90665 0
  ConsoleReporter__double_ reporter: report_time_interval=1 [s]
      input_inputs=(/forceset/biceps|fiber_force /jointset/elbow/elbow_coord_0|value(elbow_angle))
  Ground
  BodySet:
    Body De_baan: mass=1 [kg] mass_center=(0 0 0) inertia=(0 0 0 0 0 0)
      Brick De_baan_geom_1: half_lengths=(20 0.01 2)
    Body De_boot: mass=1 mass_center=(0 0 0) inertia=(0 0 0 0 0 0)
      Brick De_boot_geom_1: half_lengths=(7 0.05 1)
    Body humerus: mass=1 mass_center=(0 0 0) inertia=(0 0 0 0 0 0)
      PhysicalOffsetFrame humerusCenter: socket_parent=.. translation=(0 0.5 0) [meters]
        Ellipsoid humerusCenter_geom_1: radii=(0.1 0.5 0.1)
    Body radius: mass=1 mass_center=(0 0 0) inertia=(0 0 0 0 0 0)
      PhysicalOffsetFrame radiusCenter: socket_parent=.. translation=(0 0.5 0)
        Ellipsoid radiusCenter_geom_1: radii=(0.1 0.5 0.1)
  JointSet:
    WeldJoint baanJoint: socket_parent_frame=ground_offset socket_child_frame=De_baan_offset
      PhysicalOffsetFrame ground_offset: socket_parent=/ground translation=(0 0.005 0)
      PhysicalOffsetFrame De_baan_offset: socket_parent=/bodyset/De_baan translation=(0 0 0)
    PinJoint bootJoint: socket_parent_frame=De_baan_offset socket_child_frame=De_boot_offset
      Coordinate bootJoint_coord_0
      PhysicalOffsetFrame De_baan_offset: socket_parent=/bodyset/De_baan translation=(0 0.5 0)
      PhysicalOffsetFrame De_boot_offset: socket_parent=/bodyset/De_boot translation=(0 0 0)
    PinJoint shoulder: socket_parent_frame=De_boot_offset socket_child_frame=humerus_offset
      Coordinate shoulder_coord_0
      PhysicalOffsetFrame De_boot_offset: socket_parent=/bodyset/De_boot translation=(0 3 0)
      PhysicalOffsetFrame humerus_offset: socket_parent=/bodyset/humerus translation=(0 1 0)
    PinJoint elbow: socket_parent_frame=humerus_offset socket_child_frame=radius_offset
      Coordinate elbow_coord_0
      PhysicalOffsetFrame humerus_offset: socket_parent=/bodyset/humerus translation=(0 0 0)
      PhysicalOffsetFrame radius_offset: socket_parent=/bodyset/radius translation=(0 1 0)
  ControllerSet:
    PrescribedController: actuator_list=biceps
      FunctionSet ControlFunctions:
        StepFunction: transition_start_time=0.5 transition_end_time=3 start_value=0.3 end_value=1
  ForceSet:
    HuntCrossleyForce bootjeForce: transition_velocity=0.2
      ContactParametersSet contact_parameters:
        ContactParameters: geometry=(bootje baantje) stiffness=1000000 dissipation=2 static_friction=0.8
            dynamic_friction=0.4 viscous_friction=0.4
    Millard2012EquilibriumMuscle biceps: min_control=0.01 max_control=1 max_isometric_force=200
        optimal_fiber_length=0.6 tendon_slack_length=0.55 pennation_angle_at_optimal=0 [radians]
      PathPoint origin: humerus (0 0.8 0)
      PathPoint insertion: radius (0 0.7 0)
      ActiveForceLengthCurve: minimum_value=0
      ForceVelocityCurve: concentric_slope_at_vmax=0 concentric_slope_near_vmax=0.25 isometric_slope=5
          eccentric_slope_at_vmax=0 eccentric_slope_near_vmax=0.15 max_eccentric_velocity_force_multiplier=1.4
      FiberForceLengthCurve
      TendonForceLengthCurve
  ContactGeometrySet:
    ContactHalfSpace baantje: socket_frame=/bodyset/De_baan location=(0 0.2 0) orientation=(0 0 -1.57)
    ContactHalfSpace bootje: socket_frame=/bodyset/De_boot location=(0 0.2 0) orientation=(0 0 -1.57)
