# OpenSim document version 20302
CMC_TaskSet bootbaan_CMC:
  defaults: CMC_Joint default: weight=(1 1 1) wrt_body=-1 express_body=-1 active=(true false false) kp=(1 1 1)
      kv=(1 1 1) ka=(1 1 1) r0=(0 0 0) r1=(0 0 0) r2=(0 0 0) limit=0
  # Most use the default values
  CMC_Joint bJoint_0: weight=(1 1 1) wrt_body=-1 express_body=-1 active=(true false false) kp=(100 1 1) kv=(20 1 1)
      ka=(1 1 1) r0=(0 0 0) r1=(0 0 0) r2=(0 0 0) coordinate=bJoint_0 limit=0
  CMC_Joint bJoint_1: coordinate=bJoint_1
  CMC_Joint bJoint_2: coordinate=bJoint_2
  CMC_Joint bJoint_3: coordinate=bJoint_3
  CMC_Joint bJoint_4: coordinate=bJoint_4
  CMC_Joint bJoint_5: coordinate=bJoint_5
  CMC_Joint seatpos: coordinate=seatpos
  CMC_Joint slocangle: coordinate=slocangle
  CMC_Joint soarinout: coordinate=soarinout
  CMC_Joint sblpos: coordinate=sblpos
  CMC_Joint plocangle: coordinate=plocangle
  CMC_Joint poarinout: coordinate=poarinout
  CMC_Joint pblpos: coordinate=pblpos
  CMC_Joint hipangle: coordinate=hipangle
  CMC_Joint kneeangle: coordinate=kneeangle
  CMC_Joint footangle: coordinate=footangle
  CMC_Joint lbackangle: coordinate=lbackangle
  CMC_Joint uarmleft_out: coordinate=uarmleft_out
  CMC_Joint uarmleft_trn: coordinate=uarmleft_trn
  CMC_Joint uarmleft_up: coordinate=uarmleft_up
  CMC_Joint se_inout: coordinate=se_inout
  CMC_Joint se_updown: coordinate=se_updown
  CMC_Joint handleleft_out: coordinate=handleleft_out
  CMC_Joint handleleft_trn: coordinate=handleleft_trn
  CMC_Joint handleleft_up: coordinate=handleleft_up
  CMC_Joint uarmright_out: coordinate=uarmright_out
  CMC_Joint uarmright_trn: coordinate=uarmright_trn
  CMC_Joint uarmright_up: coordinate=uarmright_up
  CMC_Joint pe_inout: coordinate=pe_inout
  CMC_Joint pe_updown: coordinate=pe_updown
  CMC_Joint handleright_out: coordinate=handleright_out
  CMC_Joint handleright_trn: coordinate=handleright_trn
  CMC_Joint handleright_up: coordinate=handleright_up
