# OpenSim document version 30000
InverseKinematicsTool eerstetest:
  model_file: BootBaan.osim
  constraint_weight: 20
  accuracy: 1e-5
  marker_file: trajectory.trc
  time_range: 0.02 10
  output_motion_file: trajectory.mot
  report_marker_locations: true
  IKTaskSet bootbaan_IK:
    IKMarkerTask mBoat: apply=true weight=1
    IKMarkerTask mSeat: apply=true weight=1
    IKMarkerTask mShoulder: apply=true weight=2
    IKMarkerTask mpElbow: apply=true weight=1
    IKMarkerTask msElbow: apply=true weight=1
    IKMarkerTask mpHandle: apply=true weight=1
    IKMarkerTask msHandle: apply=true weight=1
    IKMarkerTask msBlade: apply=true weight=1
    IKMarkerTask mpBlade: apply=true weight=1
    IKCoordinateTask boatjoint_coord_0: weight=100000 value=0
    IKCoordinateTask boatjoint_coord_1: weight=100000 value=0
    IKCoordinateTask boatjoint_coord_2: weight=100000 value=0
    IKCoordinateTask boatjoint_coord_3: weight=100000 value=0
    IKCoordinateTask boatjoint_coord_4: weight=100000 value=0
    IKCoordinateTask boatjoint_coord_5: weight=100000 value=0
