# OpenSim document version 30000
InverseKinematicsTool eerstetest:
  model_file: BootBaan.osim
  constraint_weight: 20
  accuracy: 1e-5
  marker_file: trajectory.trc
  time_range: 0 7
  output_motion_file: trajectory.mot
  report_marker_locations: true
  IKTaskSet bootbaan_IK:
    IKMarkerTask mSeat: weight=1
    IKMarkerTask mShoulder: weight=2
    IKMarkerTask mpElbow: weight=1
    IKMarkerTask msElbow: weight=1
    IKMarkerTask mpHandle: weight=1
    IKMarkerTask msHandle: weight=1
    # keep the boat a rest during IK
    IKCoordinateTask bJoint_3: weight=1 value=0
    IKCoordinateTask bJoint_4: weight=1 value=0.0022
