# OpenSim document version 40600
Model BootBaan:
  gravity: 0 -9.90665 0
  ConsoleReporter__double_ reporter: report_time_interval=1 [s]
  Ground
  BodySet:
    Body Rowing_course: mass=1 [kg] mass_center=(0 0 0) inertia=(1 1 1 0 0 0)
      Brick Rowing_course_geom_1: half_lengths=(30 5e-5 3.5)
    Body TheBoat: mass=10 inertia=(7.508333 7.508333 45 0 0 0)
      Brick TheBoat_geom_1: half_lengths=(3 0.1 0.3)
    Body Stretcher: mass=1 mass_center=(0 0 0) inertia=(0.01083333 0.01083333 0.045 0 0 0)
      Brick Stretcher_geom_1: half_lengths=(0.05 0.05 0.3)
    Body Seat: mass=1 mass_center=(0 0 0) inertia=(1 1 1 0 0 0)
      Brick Seat_geom_1: half_lengths=(0.05 0.05 0.3)
    Body Bow: mass=0.1 mass_center=(0 0 0) inertia=(1 1 1 0 0 0)
      Sphere Bow_geom_1: radius=0.05
    Body StarboardRigger: mass=1 mass_center=(0 0 0) inertia=(1 1 1 0 0 0)
      Cylinder StarboardRigger_geom_1: radius=0.02 half_height=0.3330165
    Body StarboardLock: mass=1 mass_center=(0 0 0) inertia=(1 1 1 0 0 0)
      Cylinder StarboardLock_geom_1: radius=0.01 half_height=0.025
    Body StarboardOar: mass=1 mass_center=(0 0 0) inertia=(1 1 1 0 0 0)
      Cylinder StarboardOar_geom_1: radius=0.02 half_height=1.43
    Body StarboardBlade: mass=1 mass_center=(0 0 0) inertia=(0.1 0.1 0.1 0 0 0)
      Brick StarboardBlade_geom_1: half_lengths=(0.02 0.225 0.225)
    Body PortRigger: mass=1 mass_center=(0 0 0) inertia=(1 1 1 0 0 0)
      Cylinder PortRigger_geom_1: radius=0.02 half_height=0.3264966
    Body PortLock: mass=1 mass_center=(0 0 0) inertia=(1 1 1 0 0 0)
      Cylinder PortLock_geom_1: radius=0.01 half_height=0.025
    Body PortOar: mass=1 mass_center=(0 0 0) inertia=(1 1 1 0 0 0)
      Cylinder PortOar_geom_1: radius=0.02 half_height=1.43
    Body PortBlade: mass=1 mass_center=(0 0 0) inertia=(0.1 0.1 0.1 0 0 0)
      Brick PortBlade_geom_1: half_lengths=(0.02 0.225 0.225)
    Body StVertBlade: mass=1 mass_center=(0 0 0) inertia=(0.1 0.1 0.1 0 0 0)
      Brick StVertBlade_geom_1: half_lengths=(0.1 0.225 0.01)
    Body PrVertBlade: mass=1 mass_center=(0 0 0) inertia=(1 1 1 0 0 0)
      Brick PrVertBlade_geom_1: half_lengths=(0.1 0.225 0.01)
    Body Lower_leg: mass=8 mass_center=(0 0 0) inertia=(1 1 1 0 0 0)
      Cylinder Lower_leg_geom_1: radius=0.05 half_height=0.2511
    Body Upper_leg: mass=8 mass_center=(0 0 0) inertia=(1 1 1 0 0 0)
      Cylinder Upper_leg_geom_1: radius=0.05 half_height=0.2139
    Body Lower_back: mass=16 mass_center=(0 0 0) inertia=(1 1 1 0 0 0)
      Brick Lower_back_geom_1: half_lengths=(0.04 0.093 0.08)
    Body Upper_back: mass=16 mass_center=(0 0 0) inertia=(1 1 1 0 0 0)
      Brick Upper_back_geom_1: half_lengths=(0.05 0.2139 0.1)
    Body Shoulder: mass=8 mass_center=(0 0 0) inertia=(1 1 1 0 0 0)
      Brick Shoulder_geom_1: half_lengths=(0.0465 0.0465 0.2325)
    Body Head: mass=8 mass_center=(0 0 0) inertia=(1 1 1 0 0 0)
      Brick Head_geom_1: half_lengths=(0.04 0.1116 0.1116)
    Body Upper_Arm_Left: mass=4 mass_center=(0 0 0) inertia=(0.1 0.1 0.1 0 0 0)
      Brick Upper_Arm_Left_geom_1: half_lengths=(0.04 0.1395 0.04)
    Body Lower_Arm_Left: mass=4 mass_center=(0 0 0) inertia=(1 1 1 0 0 0)
      Brick Lower_Arm_Left_geom_1: half_lengths=(0.04 0.1302 0.04)
    Body Upper_Arm_Right: mass=4 mass_center=(0 0 0) inertia=(1 1 1 0 0 0)
      Brick Upper_Arm_Right_geom_1: half_lengths=(0.04 0.1395 0.04)
    Body Lower_Arm_Right: mass=4 mass_center=(0 0 0) inertia=(1 1 1 0 0 0)
      Brick Lower_Arm_Right_geom_1: half_lengths=(0.04 0.1302 0.04)
  JointSet:
    WeldJoint courseJoint: socket_parent_frame=ground_offset socket_child_frame=Rowing_course_offset
      PhysicalOffsetFrame ground_offset: socket_parent=/ground translation=(20 -0.0001 0) [meters]
      PhysicalOffsetFrame Rowing_course_offset: socket_parent=/bodyset/Rowing_course translation=(0 0 0)
    CustomJoint boatJoint: socket_parent_frame=ground_offset socket_child_frame=TheBoat_offset
      Coordinate bJoint_3
      Coordinate bJoint_4
      PhysicalOffsetFrame ground_offset: socket_parent=/ground translation=(0 0.1 0)
      PhysicalOffsetFrame TheBoat_offset: socket_parent=/bodyset/TheBoat translation=(0 0 0)
      SpatialTransform:
        TransformAxis rotation1: axis=(1 0 0)
        TransformAxis rotation2: axis=(0 1 0)
        TransformAxis rotation3: axis=(0 0 1)
        TransformAxis translation1: coordinates=bJoint_3 axis=(1 0 0) LinearFunction(coefficients=1 0)
        TransformAxis translation2: coordinates=bJoint_4 axis=(0 1 0) LinearFunction(coefficients=1 0)
        TransformAxis translation3: axis=(0 0 1)
    SliderJoint seatJoint: socket_parent_frame=TheBoat_offset socket_child_frame=Seat_offset
      Coordinate seatpos: default_value=-0.007375761 range=(-0.93 0.1)
      PhysicalOffsetFrame TheBoat_offset: socket_parent=/bodyset/TheBoat translation=(0.9270883 0.2 0)
      PhysicalOffsetFrame Seat_offset: socket_parent=/bodyset/Seat translation=(0 0 0)
    WeldJoint bowJoint: socket_parent_frame=TheBoat_offset socket_child_frame=Bow_offset
      PhysicalOffsetFrame TheBoat_offset: socket_parent=/bodyset/TheBoat translation=(3 0.1 0)
      PhysicalOffsetFrame Bow_offset: socket_parent=/bodyset/Bow translation=(0 0 0)
    PinJoint starboardlockJoint: socket_parent_frame=StarboardRigger_offset socket_child_frame=StarboardLock_offset
      Coordinate slocangle: default_value=-0.3605327 range=(-1.570796 1.570796) clamped=true
      PhysicalOffsetFrame StarboardRigger_offset: socket_parent=/bodyset/StarboardRigger translation=(0 -0.3330165 0)
          orientation=(0.7216549 0 0) [radians]
      PhysicalOffsetFrame StarboardLock_offset: socket_parent=/bodyset/StarboardLock translation=(0 0.025 0)
          orientation=(1.570796 0 0)
    PinJoint starboardoarJoint: socket_parent_frame=StarboardLock_offset socket_child_frame=StarboardOar_offset
      Coordinate soarinout: default_value=0.1902409 range=(0 1) clamped=true
      PhysicalOffsetFrame StarboardLock_offset: socket_parent=/bodyset/StarboardLock translation=(0 0 0)
          orientation=(1.570796 1.570796 0)
      PhysicalOffsetFrame StarboardOar_offset: socket_parent=/bodyset/StarboardOar translation=(0 0.55 0)
    PinJoint starboardbladeJoint: socket_parent_frame=StarboardOar_offset socket_child_frame=StarboardBlade_offset
      Coordinate sblpos: range=(-0.6 0.1) clamped=true
      PhysicalOffsetFrame StarboardOar_offset: socket_parent=/bodyset/StarboardOar translation=(0 -0.98 0)
      PhysicalOffsetFrame StarboardBlade_offset: socket_parent=/bodyset/StarboardBlade translation=(0 0.225 0)
    WeldJoint stvert_Joint: socket_parent_frame=StarboardBlade_offset socket_child_frame=StVertBlade_offset
      PhysicalOffsetFrame StarboardBlade_offset: socket_parent=/bodyset/StarboardBlade translation=(0 0 0)
      PhysicalOffsetFrame StVertBlade_offset: socket_parent=/bodyset/StVertBlade translation=(0 0 0)
    PinJoint portlockJoint: socket_parent_frame=PortRigger_offset socket_child_frame=PortLock_offset
      Coordinate plocangle: default_value=-0.3605327 range=(-1.570796 1.570796) clamped=true
      PhysicalOffsetFrame PortRigger_offset: socket_parent=/bodyset/PortRigger translation=(0 -0.3264966 0)
          orientation=(-0.6986598 0 0)
      PhysicalOffsetFrame PortLock_offset: socket_parent=/bodyset/PortLock translation=(0 0.025 0)
          orientation=(-1.570796 0 0)
    PinJoint portoarJoint: socket_parent_frame=PortLock_offset socket_child_frame=PortOar_offset
      Coordinate poarinout: default_value=0.1906947 range=(0 1) clamped=true
      PhysicalOffsetFrame PortLock_offset: socket_parent=/bodyset/PortLock translation=(0 0 0)
          orientation=(-1.570796 -1.570796 0)
      PhysicalOffsetFrame PortOar_offset: socket_parent=/bodyset/PortOar translation=(0 0.55 0)
    PinJoint portbladeJoint: socket_parent_frame=PortOar_offset socket_child_frame=PortBlade_offset
      Coordinate pblpos: range=(-0.6 0.1) clamped=true
      PhysicalOffsetFrame PortOar_offset: socket_parent=/bodyset/PortOar translation=(0 -0.98 0)
          orientation=(0 0 3.141593)
      PhysicalOffsetFrame PortBlade_offset: socket_parent=/bodyset/PortBlade translation=(0 -0.225 0)
    WeldJoint ptvert_Joint: socket_parent_frame=PortBlade_offset socket_child_frame=PrVertBlade_offset
      PhysicalOffsetFrame PortBlade_offset: socket_parent=/bodyset/PortBlade translation=(0 0 0)
      PhysicalOffsetFrame PrVertBlade_offset: socket_parent=/bodyset/PrVertBlade translation=(0 0 0)
    PinJoint hipJoint: socket_parent_frame=Seat_offset socket_child_frame=Upper_leg_offset
      Coordinate hipangle: default_value=1.377065 range=(-0.3 3.141593) clamped=true
      PhysicalOffsetFrame Seat_offset: socket_parent=/bodyset/Seat translation=(0 0.05 0)
      PhysicalOffsetFrame Upper_leg_offset: socket_parent=/bodyset/Upper_leg translation=(0 -0.2139 0)
    PinJoint knee_Joint: socket_parent_frame=Upper_leg_offset socket_child_frame=Lower_leg_offset
      Coordinate kneeangle: default_value=0.1745329 range=(-0.7853982 3.141593) clamped=true
      PhysicalOffsetFrame Upper_leg_offset: socket_parent=/bodyset/Upper_leg translation=(0 0.2139 0)
      PhysicalOffsetFrame Lower_leg_offset: socket_parent=/bodyset/Lower_leg translation=(0 -0.2511 0)
    PinJoint foot_Joint: socket_parent_frame=Stretcher_offset socket_child_frame=Lower_leg_offset
      Coordinate footangle: default_value=0.08726646 range=(-1.570796 1.570796) clamped=true
      PhysicalOffsetFrame Stretcher_offset: socket_parent=/bodyset/Stretcher translation=(0 0.05 0)
          orientation=(0 0 1.570796)
      PhysicalOffsetFrame Lower_leg_offset: socket_parent=/bodyset/Lower_leg translation=(0 0.2511 0)
    PinJoint lbackJoint: socket_parent_frame=Seat_offset socket_child_frame=Lower_back_offset
      Coordinate lbackangle: default_value=-0.7681194 range=(-1.570796 0.3) clamped=true
      PhysicalOffsetFrame Seat_offset: socket_parent=/bodyset/Seat translation=(0 0.05 0)
      PhysicalOffsetFrame Lower_back_offset: socket_parent=/bodyset/Lower_back translation=(0 -0.093 0)
    WeldJoint ubackJoint: socket_parent_frame=Lower_back_offset socket_child_frame=Upper_back_offset
      PhysicalOffsetFrame Lower_back_offset: socket_parent=/bodyset/Lower_back translation=(0 0.093 0)
          orientation=(0 0 0.3)
      PhysicalOffsetFrame Upper_back_offset: socket_parent=/bodyset/Upper_back translation=(0 -0.2139 0)
    WeldJoint shoulderJoint: socket_parent_frame=Upper_back_offset socket_child_frame=Shoulder_offset
      PhysicalOffsetFrame Upper_back_offset: socket_parent=/bodyset/Upper_back translation=(0 0.2139 0)
      PhysicalOffsetFrame Shoulder_offset: socket_parent=/bodyset/Shoulder translation=(0 -0.0465 0)
    WeldJoint headJoint: socket_parent_frame=Shoulder_offset socket_child_frame=Head_offset
      PhysicalOffsetFrame Shoulder_offset: socket_parent=/bodyset/Shoulder translation=(0 0.0465 0)
      PhysicalOffsetFrame Head_offset: socket_parent=/bodyset/Head translation=(0 -0.1116 0)
    CustomJoint upper_arm_left_Joint: socket_parent_frame=Shoulder_offset socket_child_frame=Upper_Arm_Left_offset
      Coordinate uarmleft_up: default_value=0
      Coordinate uarmleft_out: default_value=0
      Coordinate uarmleft_trn: default_value=0
      PhysicalOffsetFrame Shoulder_offset: socket_parent=/bodyset/Shoulder translation=(0 0 0.2325)
          orientation=(0 0 1.570796)
      PhysicalOffsetFrame Upper_Arm_Left_offset: socket_parent=/bodyset/Upper_Arm_Left translation=(0 -0.1395 0)
      SpatialTransform:
        TransformAxis rotation1: coordinates=uarmleft_up axis=(0 0 1) LinearFunction(coefficients=1 0)
        TransformAxis rotation2: coordinates=uarmleft_out axis=(-1 0 0) LinearFunction(coefficients=1 0)
        TransformAxis rotation3: coordinates=uarmleft_trn axis=(0 1 0) LinearFunction(coefficients=1 0)
        TransformAxis translation1: axis=(1 0 0)
        TransformAxis translation2: axis=(0 1 0)
        TransformAxis translation3: axis=(0 0 1)
    CustomJoint elbow_left_Joint: socket_parent_frame=Upper_Arm_Left_offset socket_child_frame=Lower_Arm_Left_offset
      Coordinate se_inout
      Coordinate se_updown
      PhysicalOffsetFrame Upper_Arm_Left_offset: socket_parent=/bodyset/Upper_Arm_Left translation=(0 0.1395 0)
      PhysicalOffsetFrame Lower_Arm_Left_offset: socket_parent=/bodyset/Lower_Arm_Left translation=(0 -0.1302 0)
      SpatialTransform:
        TransformAxis rotation1: coordinates=se_inout axis=(1 0 0) LinearFunction(coefficients=1 0)
        TransformAxis rotation2: axis=(0 1 0)
        TransformAxis rotation3: coordinates=se_updown axis=(0 0 1) LinearFunction(coefficients=1 0)
        TransformAxis translation1: axis=(1 0 0)
        TransformAxis translation2: axis=(0 1 0)
        TransformAxis translation3: axis=(0 0 1)
    BallJoint handle_left_Joint: socket_parent_frame=StarboardOar_offset socket_child_frame=Lower_Arm_Left_offset
      Coordinate handleleft_out
      Coordinate handleleft_trn
      Coordinate handleleft_up
      PhysicalOffsetFrame StarboardOar_offset: socket_parent=/bodyset/StarboardOar translation=(0 1.405 0)
          orientation=(1.570796 -0.7853982 0)
      PhysicalOffsetFrame Lower_Arm_Left_offset: socket_parent=/bodyset/Lower_Arm_Left translation=(0 0.1302 0)
          orientation=(0 0 3.141593)
    CustomJoint upper_arm_right_Joint: socket_parent_frame=Shoulder_offset socket_child_frame=Upper_Arm_Right_offset
      Coordinate uarmright_up: default_value=0
      Coordinate uarmright_out: default_value=0
      Coordinate uarmright_trn: default_value=0
      PhysicalOffsetFrame Shoulder_offset: socket_parent=/bodyset/Shoulder translation=(0 0 -0.2325)
          orientation=(0 0 -1.570796)
      PhysicalOffsetFrame Upper_Arm_Right_offset: socket_parent=/bodyset/Upper_Arm_Right translation=(0 0.1395 0)
      SpatialTransform:
        TransformAxis rotation1: coordinates=uarmright_up axis=(0 0 1) LinearFunction(coefficients=1 0)
        TransformAxis rotation2: coordinates=uarmright_out axis=(-1 0 0) LinearFunction(coefficients=1 0)
        TransformAxis rotation3: coordinates=uarmright_trn axis=(0 1 0) LinearFunction(coefficients=1 0)
        TransformAxis translation1: axis=(1 0 0)
        TransformAxis translation2: axis=(0 1 0)
        TransformAxis translation3: axis=(0 0 1)
    CustomJoint elbow_right_Joint: socket_parent_frame=Upper_Arm_Right_offset socket_child_frame=Lower_Arm_Right_offset
      Coordinate pe_inout
      Coordinate pe_updown
      PhysicalOffsetFrame Upper_Arm_Right_offset: socket_parent=/bodyset/Upper_Arm_Right translation=(0 -0.1395 0)
      PhysicalOffsetFrame Lower_Arm_Right_offset: socket_parent=/bodyset/Lower_Arm_Right translation=(0 0.1302 0)
      SpatialTransform:
        TransformAxis rotation1: coordinates=pe_inout axis=(1 0 0) LinearFunction(coefficients=1 0)
        TransformAxis rotation2: axis=(0 1 0)
        TransformAxis rotation3: coordinates=pe_updown axis=(0 0 1) LinearFunction(coefficients=1 0)
        TransformAxis translation1: axis=(1 0 0)
        TransformAxis translation2: axis=(0 1 0)
        TransformAxis translation3: axis=(0 0 1)
    BallJoint handle_right_Joint: socket_parent_frame=PortOar_offset socket_child_frame=Lower_Arm_Right_offset
      Coordinate handleright_out
      Coordinate handleright_trn
      Coordinate handleright_up
      PhysicalOffsetFrame PortOar_offset: socket_parent=/bodyset/PortOar translation=(0 1.405 0)
          orientation=(-1.570796 0.7853982 0)
      PhysicalOffsetFrame Lower_Arm_Right_offset: socket_parent=/bodyset/Lower_Arm_Right translation=(0 -0.1302 0)
  ConstraintSet:
    WeldConstraint boatconstraint: socket_frame1=TheBoat_offset socket_frame2=Stretcher_offset
      PhysicalOffsetFrame TheBoat_offset: socket_parent=/bodyset/TheBoat translation=(0 0.1 0)
      PhysicalOffsetFrame Stretcher_offset: socket_parent=/bodyset/Stretcher translation=(0 0 0)
    WeldConstraint star_constraint: socket_frame1=TheBoat_offset socket_frame2=StarboardRigger_offset
      PhysicalOffsetFrame TheBoat_offset: socket_parent=/bodyset/TheBoat translation=(0.45 0 0.3)
          orientation=(-2.292451 0 0)
      PhysicalOffsetFrame StarboardRigger_offset: socket_parent=/bodyset/StarboardRigger translation=(0 0.3330165 0)
    WeldConstraint port_constraint: socket_frame1=TheBoat_offset socket_frame2=PortRigger_offset
      PhysicalOffsetFrame TheBoat_offset: socket_parent=/bodyset/TheBoat translation=(0.45 0 -0.3)
          orientation=(2.269456 0 0)
      PhysicalOffsetFrame PortRigger_offset: socket_parent=/bodyset/PortRigger translation=(0 0.3264966 0)
    CoordinateCouplerConstraint s_blade: independent_coordinate_names=soarinout dependent_coordinate_name=sblpos
        coupled_coordinates_function=LinearFunction(coefficients=-1 0)
    CoordinateCouplerConstraint p_blade: independent_coordinate_names=poarinout dependent_coordinate_name=pblpos
        coupled_coordinates_function=LinearFunction(coefficients=-1 0)
  ForceSet:
    CoordinateActuator seatact: coordinate=seatpos optimal_force=1
    CoordinateActuator slocact: coordinate=slocangle optimal_force=1
    CoordinateActuator soarinoutact: coordinate=soarinout optimal_force=1
    CoordinateActuator sblact: coordinate=sblpos optimal_force=1
    CoordinateActuator plocact: coordinate=plocangle optimal_force=1
    CoordinateActuator poarinoutact: coordinate=poarinout optimal_force=1
    CoordinateActuator pblact: coordinate=pblpos optimal_force=1
    CoordinateActuator hipact: coordinate=hipangle optimal_force=1
    CoordinateActuator kneeact: coordinate=kneeangle optimal_force=1
    CoordinateActuator footact: coordinate=footangle optimal_force=1
    CoordinateActuator lbackact: coordinate=lbackangle optimal_force=1
    CoordinateActuator ualo_act: coordinate=uarmleft_up optimal_force=1
    CoordinateActuator ualt_act: coordinate=uarmleft_out optimal_force=1
    CoordinateActuator ualu_act: coordinate=uarmleft_trn optimal_force=1
    CoordinateActuator sinout_act: coordinate=se_inout optimal_force=1
    CoordinateActuator supdown_act: coordinate=se_updown optimal_force=1
    CoordinateActuator hlout_act: coordinate=handleleft_out optimal_force=1
    CoordinateActuator hltrn_act: coordinate=handleleft_trn optimal_force=1
    CoordinateActuator hlup_act: coordinate=handleleft_up optimal_force=1
    CoordinateActuator uaro_act: coordinate=uarmright_up optimal_force=1
    CoordinateActuator uart_act: coordinate=uarmleft_out optimal_force=1
    CoordinateActuator uaru_act: coordinate=uarmleft_trn optimal_force=1
    CoordinateActuator pinout_act: coordinate=pe_inout
    CoordinateActuator pundown_act: coordinate=pe_updown
    CoordinateActuator hrout_act: coordinate=handleright_out
    CoordinateActuator hrtrn_act: coordinate=handleright_trn
    CoordinateActuator hrup_act: coordinate=handleright_up
    ElasticFoundationForce Boot: transition_velocity=0.02
      ContactParametersSet contact_parameters:
        ContactParameters: geometry=(boot baan) stiffness=1000000 dissipation=1 static_friction=0.001
            dynamic_friction=0.001 viscous_friction=0.001
    ElasticFoundationForce SBlad: transition_velocity=0.02
      ContactParametersSet contact_parameters:
        ContactParameters: geometry=(sblad baan) stiffness=50000 dissipation=0.8 static_friction=1.1
            dynamic_friction=1.1 viscous_friction=1.04
    ElasticFoundationForce PBlad: transition_velocity=0.02
      ContactParametersSet contact_parameters:
        ContactParameters: geometry=(pblad baan) stiffness=50000 dissipation=0.8 static_friction=1.1
            dynamic_friction=1.1 viscous_friction=1.04
  MarkerSet:
    Marker mSeat: Seat (0 0 0)
    Marker mShoulder: Shoulder (0 0 0)
    Marker msElbow: Upper_Arm_Left (0 0.1395 0)
    Marker mpElbow: Upper_Arm_Right (0 -0.1395 0)
    Marker msHandle: StarboardOar (0 1.405 0)
    Marker mpHandle: PortOar (0 1.405 0)
  ContactGeometrySet:
    ContactHalfSpace baan: socket_frame=/ground location=(0 0 0) orientation=(0 0 -1.570796)
    ContactMesh boot: socket_frame=/bodyset/TheBoat location=(0 0 0) orientation=(-1.570796 0 0)
        filename=box6_0.6_0.2.stl
    ContactMesh sblad: socket_frame=/bodyset/StarboardBlade location=(0 0 0) orientation=(0 -1.570796 0)
        filename=box0.05_0.45_0.45.stl
    ContactMesh pblad: socket_frame=/bodyset/PortBlade location=(0 0 0) orientation=(0 1.570796 0)
        filename=box0.05_0.45_0.45.stl
