# OpenSim document version 20302
CMC_TaskSet bootbaan_CMC:
  defaults: CMC_Joint default: on=false weight=(1 1 1) wrt_body=-1 express_body=-1 active=(true false false)
      kp=(100 1 1) kv=(20 1 1) ka=(1 1 1) r0=(0 0 0) r1=(0 0 0) r2=(0 0 0) limit=0
  CMC_Joint kneeangle: weight=(1 1 1) kp=100 kv=20 coordinate=kneeangle
  # lbackangle in both arm-kinematic loops
  CMC_Joint lbackangle: weight=(1 1 1) kp=100 kv=20 coordinate=lbackangle
  # Kinematic loop in the left arm:
  CMC_Joint uarmleft_out: weight=(1 1 1) kp=100 kv=20 coordinate=uarmleft_out
  CMC_Joint uarmleft_up: weight=(1 1 1) kp=100 kv=20 coordinate=uarmleft_up
  CMC_Joint uarmleft_trn: weight=(1 1 1) kp=100 kv=20 coordinate=uarmleft_trn
  CMC_Joint soarinout: weight=(1 1 1) coordinate=soarinout
  # Kinematic loop in the right arm:
  CMC_Joint uarmright_out: weight=(1 1 1) kp=100 kv=20 coordinate=uarmright_out
  CMC_Joint uarmright_trn: weight=(1 1 1) kp=100 kv=20 coordinate=uarmright_trn
  CMC_Joint uarmright_up: weight=(1 1 1) kp=100 kv=20 coordinate=uarmright_up
  CMC_Joint plocangle: weight=(100 1 1) coordinate=plocangle
