# OpenSim document version 40600
Model Blade:
  gravity: 0 -9.90665 0
  ConsoleReporter__double_ reporter: report_time_interval=1 [s]
  Ground
  BodySet:
    Body Bottom: mass=1 [kg] mass_center=(0 0 0) inertia=(1 1 1 0 0 0)
      Brick Bottom_geom_1: half_lengths=(2.5 2.5 0.005)
    Body The__upper_leg: mass=50 mass_center=(0 0 0) inertia=(1 1 1 0 0 0)
      Cylinder The__upper_leg_geom_1: radius=0.025 half_height=0.5
    Body The__lower_leg: mass=50 mass_center=(0 0 0) inertia=(1 1 1 0 0 0)
      Cylinder The__lower_leg_geom_1: radius=0.025 half_height=0.5
    Body turnft: mass=1 inertia=(1 1 1 0 0 0)
    Body TheBlade: mass=100 inertia=(7 7 45 0 0 0)
      Brick TheBlade_geom_1: half_lengths=(0.3 0.3 0.025)
    Body TheBlade2: mass=100 inertia=(7 7 45 0 0 0)
      Brick TheBlade2_geom_1: half_lengths=(0.3 0.01 0.3)
  JointSet:
    WeldJoint bottomJoint: socket_parent_frame=ground_offset socket_child_frame=Bottom_offset
      PhysicalOffsetFrame ground_offset: socket_parent=/ground translation=(0 0 0) [meters]
          orientation=(1.570796 0 0) [radians]
      PhysicalOffsetFrame Bottom_offset: socket_parent=/bodyset/Bottom translation=(0 0 0)
    PinJoint pelvis_Joint: socket_parent_frame=ground_offset socket_child_frame=The__upper_leg_offset
      Coordinate pelvisangle: default_value=0.8203047 range=(0 1.570796) clamped=true
      PhysicalOffsetFrame ground_offset: socket_parent=/ground translation=(0 0.1 0)
      PhysicalOffsetFrame The__upper_leg_offset: socket_parent=/bodyset/The__upper_leg translation=(0 -0.5 0)
    PinJoint knee_Joint: socket_parent_frame=The__upper_leg_offset socket_child_frame=The__lower_leg_offset
      Coordinate kneeangle: default_value=1.570796 range=(0 1.570796) clamped=true
      PhysicalOffsetFrame The__upper_leg_offset: socket_parent=/bodyset/The__upper_leg translation=(0 0.5 0)
      PhysicalOffsetFrame The__lower_leg_offset: socket_parent=/bodyset/The__lower_leg translation=(0 -0.5 0)
    PinJoint blade_Joint: socket_parent_frame=The__lower_leg_offset socket_child_frame=turnft_offset
      Coordinate footangle: default_value=0.7679449 range=(0 1.570796) clamped=true
      PhysicalOffsetFrame The__lower_leg_offset: socket_parent=/bodyset/The__lower_leg translation=(0 0.5 0)
      PhysicalOffsetFrame turnft_offset: socket_parent=/bodyset/turnft translation=(0 0 0)
    PinJoint turn_Joint: socket_parent_frame=turnft_offset socket_child_frame=TheBlade_offset
      Coordinate turnangle: default_value=0 range=(-1.570796 1.570796) clamped=true
      PhysicalOffsetFrame turnft_offset: socket_parent=/bodyset/turnft translation=(0 0 0) orientation=(1.570796 0 0)
      PhysicalOffsetFrame TheBlade_offset: socket_parent=/bodyset/TheBlade translation=(0 0 0)
    WeldJoint vert_Joint: socket_parent_frame=TheBlade_offset socket_child_frame=TheBlade2_offset
      PhysicalOffsetFrame TheBlade_offset: socket_parent=/bodyset/TheBlade translation=(0 0 0)
      PhysicalOffsetFrame TheBlade2_offset: socket_parent=/bodyset/TheBlade2 translation=(0 0 0)
  ForceSet:
    BladeForce Course: transition_velocity=0.2
      ContactParametersSet contact_parameters:
        ContactParameters: geometry=(bootje baantje) stiffness=1000000 dissipation=2 static_friction=0.8
            dynamic_friction=0.4 viscous_friction=0.4
  ContactGeometrySet:
    ContactHalfSpace baantje: socket_frame=/bodyset/Bottom location=(0 0 0) orientation=(0 -1.570796 0)
    ContactMesh bootje: socket_frame=/bodyset/TheBlade location=(0 0 0) orientation=(0 3.141593 0)
        filename=box0.05_0.6_0.6.stl
