# OpenSim document version 40000
Model leg:
  TableReporter__double_ reporter: report_time_interval=0.01 [s]
      input_inputs=(/forceset/vastus|normalized_fiber_length(lm) /forceset/vastus|active_force_length_multiplier(fl))
  Ground
  BodySet:
    Body thigh: mass=5 [kg] mass_center=(0 0 0) inertia=(1 1 1 0 0 0)
      Ellipsoid thigh_geom_1: radii=(0.05 0.25 0.05)
      WrapCylinder patella: translation=(0 -0.25 0) quadrant=x radius=0.04 length=0.1
    Body shank: mass=5 mass_center=(0 0 0) inertia=(1 1 1 0 0 0)
      Ellipsoid shank_geom_1: radii=(0.05 0.25 0.05)
  JointSet:
    PinJoint hip: socket_parent_frame=ground_offset socket_child_frame=thigh_offset
      Coordinate hip_coord_0: default_value=1.570795 locked=true
      PhysicalOffsetFrame ground_offset: socket_parent=/ground translation=(0 1 0) [meters]
      PhysicalOffsetFrame thigh_offset: socket_parent=/bodyset/thigh translation=(0 0.25 0)
    PinJoint knee: socket_parent_frame=thigh_offset socket_child_frame=shank_offset
      Coordinate knee_coord_0: default_value=-1.570795
      PhysicalOffsetFrame thigh_offset: socket_parent=/bodyset/thigh translation=(0 -0.25 0)
      PhysicalOffsetFrame shank_offset: socket_parent=/bodyset/shank translation=(0 0.25 0)
  ControllerSet:
    PrescribedController: enabled=false actuator_list=vastus
      FunctionSet ControlFunctions:
        StepFunction: transition_start_time=0.3 transition_end_time=0.35 start_value=0.05 end_value=0.5
    ToyReflexController: actuator_list=vastus gain=40
  ForceSet:
    Millard2012EquilibriumMuscle vastus: min_control=0.01 max_control=1 max_isometric_force=500
        optimal_fiber_length=0.19 tendon_slack_length=0.19
      PathPoint origin: thigh (0.05 0 0)
      PathPoint insertion: shank (0.0375 0.175 0)
      PathWrap: wrap_object=patella method=hybrid
      ActiveForceLengthCurve: minimum_value=0
      ForceVelocityCurve: concentric_slope_at_vmax=0 concentric_slope_near_vmax=0.25 isometric_slope=5
          eccentric_slope_at_vmax=0 eccentric_slope_near_vmax=0.15 max_eccentric_velocity_force_multiplier=1.4
      FiberForceLengthCurve
      TendonForceLengthCurve
