# OpenSim document version 40000
Model Pusher:
  gravity: 0 -9.90665 0
  ConsoleReporter__double_ reporter: report_time_interval=1 [s]
  Ground
  BodySet:
    Body The_rowing_course: mass=1 [kg] mass_center=(0 0 0) inertia=(0 0 0 0 0 0)
      Brick The_rowing_course_geom_1: half_lengths=(20 0.05 2)
    Body TheBoat: mass=1 inertia=(1 1 1 0 0 0)
      Brick TheBoat_geom_1: half_lengths=(6 0.3 0.8)
    Body The_upper_leg: mass=1 mass_center=(0 0 0) inertia=(0 0 0 0 0 0)
      Cylinder The_upper_leg_geom_1: radius=0.1 half_height=1
    Body The_lower_leg: mass=1 mass_center=(0 0 0) inertia=(0 0 0 0 0 0)
      Cylinder The_lower_leg_geom_1: radius=0.1 half_height=1.5
    Body TheBlade: mass=1 inertia=(1 1 1 0 0 0)
      Brick TheBlade_geom_1: half_lengths=(0.03 0.6 0.6)
  JointSet:
    WeldJoint courseJoint: socket_parent_frame=ground_offset socket_child_frame=The_rowing_course_offset
      PhysicalOffsetFrame ground_offset: socket_parent=/ground translation=(0 0.025 0) [meters]
      PhysicalOffsetFrame The_rowing_course_offset: socket_parent=/bodyset/The_rowing_course translation=(0 0 0)
    FreeJoint boatJoint: socket_parent_frame=The_rowing_course_offset socket_child_frame=TheBoat_offset
      Coordinate boatJoint_coord_0
      Coordinate boatJoint_coord_1
      Coordinate boatJoint_coord_2
      Coordinate boatJoint_coord_3
      Coordinate boatJoint_coord_4
      Coordinate boatJoint_coord_5
      PhysicalOffsetFrame The_rowing_course_offset: socket_parent=/bodyset/The_rowing_course translation=(0 0.5 0)
      PhysicalOffsetFrame TheBoat_offset: socket_parent=/bodyset/TheBoat translation=(0 0 0)
    PinJoint baseJoint: socket_parent_frame=TheBoat_offset socket_child_frame=The_upper_leg_offset
      Coordinate baseangle: range=(-1.4 1)
      PhysicalOffsetFrame TheBoat_offset: socket_parent=/bodyset/TheBoat translation=(5 0.3 0)
      PhysicalOffsetFrame The_upper_leg_offset: socket_parent=/bodyset/The_upper_leg translation=(0 -1 0)
    PinJoint lowerJoint: socket_parent_frame=The_upper_leg_offset socket_child_frame=The_lower_leg_offset
      Coordinate lowerangle: range=(-1.2 1.570796)
      PhysicalOffsetFrame The_upper_leg_offset: socket_parent=/bodyset/The_upper_leg translation=(0 1 0)
      PhysicalOffsetFrame The_lower_leg_offset: socket_parent=/bodyset/The_lower_leg translation=(0 -1.5 0)
          orientation=(0 0 1.570796) [radians]
    PinJoint bladeJoint: socket_parent_frame=The_lower_leg_offset socket_child_frame=TheBlade_offset
      Coordinate bladeangle: range=(0 1.570796)
      PhysicalOffsetFrame The_lower_leg_offset: socket_parent=/bodyset/The_lower_leg translation=(0 1.6 0)
      PhysicalOffsetFrame TheBlade_offset: socket_parent=/bodyset/TheBlade translation=(0 0 0)
  ControllerSet:
    PrescribedController: actuator_list=(act_1 act_2 act_3)
      FunctionSet ControlFunctions: Constant(value=0) Constant(value=0) Constant(value=0)
  ForceSet:
    CoordinateActuator act_1: coordinate=baseangle
    CoordinateActuator act_2: coordinate=lowerangle
    CoordinateActuator act_3: coordinate=bladeangle
    HuntCrossleyForce BoatForce_1: transition_velocity=0.1
      ContactParametersSet contact_parameters:
        ContactParameters: geometry=(corner_1 baantje) stiffness=1000000 dissipation=0.8 static_friction=0.1
            dynamic_friction=0.4 viscous_friction=0.4
    HuntCrossleyForce BoatForce_2: transition_velocity=0.1
      ContactParametersSet contact_parameters:
        ContactParameters: geometry=(corner_2 baantje) stiffness=1000000 dissipation=0.8 static_friction=0.1
            dynamic_friction=0.4 viscous_friction=0.4
    HuntCrossleyForce BoatForce_3: transition_velocity=0.1
      ContactParametersSet contact_parameters:
        ContactParameters: geometry=(corner_3 baantje) stiffness=1000000 dissipation=0.8 static_friction=0.1
            dynamic_friction=0.4 viscous_friction=0.4
    HuntCrossleyForce BoatForce_4: transition_velocity=0.1
      ContactParametersSet contact_parameters:
        ContactParameters: geometry=(corner_4 baantje) stiffness=1000000 dissipation=0.8 static_friction=0.1
            dynamic_friction=0.4 viscous_friction=0.4
    HuntCrossleyForce BladeForce_1: transition_velocity=0.1
      ContactParametersSet contact_parameters:
        ContactParameters: geometry=(blade_1 baantje) stiffness=1000000 dissipation=0.8 static_friction=0.1
            dynamic_friction=0.4 viscous_friction=0.4
    HuntCrossleyForce BladeForce_2: transition_velocity=0.1
      ContactParametersSet contact_parameters:
        ContactParameters: geometry=(blade_2 baantje) stiffness=1000000 dissipation=0.8 static_friction=0.1
            dynamic_friction=0.4 viscous_friction=0.4
    HuntCrossleyForce BladeForce_3: transition_velocity=0.1
      ContactParametersSet contact_parameters:
        ContactParameters: geometry=(blade_3 baantje) stiffness=1000000 dissipation=0.8 static_friction=0.1
            dynamic_friction=0.4 viscous_friction=0.4
    HuntCrossleyForce BladeForce_4: transition_velocity=0.1
      ContactParametersSet contact_parameters:
        ContactParameters: geometry=(blade_4 baantje) stiffness=1000000 dissipation=0.8 static_friction=0.1
            dynamic_friction=0.4 viscous_friction=0.4
    HuntCrossleyForce elbow_force_0: transition_velocity=0.1
      ContactParametersSet contact_parameters:
        ContactParameters: geometry=(elbow_0 baantje) stiffness=1000000 dissipation=0.8 static_friction=0.1
            dynamic_friction=0.4 viscous_friction=0.4
  ContactGeometrySet:
    ContactHalfSpace baantje: socket_frame=/bodyset/The_rowing_course location=(0 0.1 0) orientation=(0 0 -1.570796)
    ContactSphere corner_1: socket_frame=/bodyset/TheBoat location=(6 -0.3 -0.8) radius=0.1
    ContactSphere corner_2: socket_frame=/bodyset/TheBoat location=(-6 -0.3 -0.8) radius=0.1
    ContactSphere corner_3: socket_frame=/bodyset/TheBoat location=(6 -0.3 0.8) radius=0.1
    ContactSphere corner_4: socket_frame=/bodyset/TheBoat location=(-6 -0.3 0.8) radius=0.1
    ContactSphere blade_1: socket_frame=/bodyset/TheBlade location=(0.05 0.6 0.6) radius=0.1
    ContactSphere blade_2: socket_frame=/bodyset/TheBlade location=(0.05 0.6 -0.6) radius=0.1
    ContactSphere blade_3: socket_frame=/bodyset/TheBlade location=(0.05 -0.6 0.6) radius=0.1
    ContactSphere blade_4: socket_frame=/bodyset/TheBlade location=(0.05 -0.6 -0.6) radius=0.1
    ContactSphere elbow_0: socket_frame=/bodyset/The_upper_leg location=(0 1 0) radius=0.1
