# OpenSim document version 40000
Model Pusher_muscle:
  gravity: 0 -9.90665 0
  ConsoleReporter__double_ reporter: report_time_interval=1 [s]
  Ground
  BodySet:
    Body The_rowing_course: mass=1 [kg] mass_center=(0 0 0) inertia=(1 1 1 0 0 0)
      Brick The_rowing_course_geom_1: half_lengths=(20 0.05 3.5)
    Body TheBoat: mass=50 inertia=(7 7 45 0 0 0)
      Brick TheBoat_geom_1: half_lengths=(3 0.1 0.3)
    Body The_upper_leg: mass=1 mass_center=(0 0 0) inertia=(1 1 1 0 0 0)
      Cylinder The_upper_leg_geom_1: radius=0.1 half_height=1
      WrapCylinder patella: translation=(0 1 0) quadrant=y radius=0.1 length=0.1
    Body The_lower_leg: mass=1 mass_center=(0 0 0) inertia=(1 1 1 0 0 0)
      Cylinder The_lower_leg_geom_1: radius=0.1 half_height=1.5
    Body TheBlade: mass=1 inertia=(1 1 1 0 0 0)
      Brick TheBlade_geom_1: half_lengths=(0.025 0.225 0.225)
  JointSet:
    WeldJoint courseJoint: socket_parent_frame=ground_offset socket_child_frame=The_rowing_course_offset
      PhysicalOffsetFrame ground_offset: socket_parent=/ground translation=(0 -0.05 0) [meters]
      PhysicalOffsetFrame The_rowing_course_offset: socket_parent=/bodyset/The_rowing_course translation=(0 0 0)
    CustomJoint boatJoint: socket_parent_frame=ground_offset socket_child_frame=TheBoat_offset
      Coordinate bJoint_3
      Coordinate bJoint_4
      PhysicalOffsetFrame ground_offset: socket_parent=/ground translation=(0 0.1 0)
      PhysicalOffsetFrame TheBoat_offset: socket_parent=/bodyset/TheBoat translation=(0 0 0)
      SpatialTransform:
        TransformAxis rotation1: axis=(1 0 0)
        TransformAxis rotation2: axis=(0 1 0)
        TransformAxis rotation3: axis=(0 0 1)
        TransformAxis translation1: coordinates=bJoint_3 axis=(1 0 0) LinearFunction(coefficients=1 0)
        TransformAxis translation2: coordinates=bJoint_4 axis=(0 1 0) LinearFunction(coefficients=1 0)
        TransformAxis translation3: axis=(0 0 1)
    PinJoint baseJoint: socket_parent_frame=TheBoat_offset socket_child_frame=The_upper_leg_offset
      Coordinate baseangle: range=(-1.4 1)
      PhysicalOffsetFrame TheBoat_offset: socket_parent=/bodyset/TheBoat translation=(2 0.1 0)
      PhysicalOffsetFrame The_upper_leg_offset: socket_parent=/bodyset/The_upper_leg translation=(0 -1 0)
    PinJoint kneeJoint: socket_parent_frame=The_upper_leg_offset socket_child_frame=The_lower_leg_offset
      Coordinate kneeangle: range=(-1.2 1.570796)
      PhysicalOffsetFrame The_upper_leg_offset: socket_parent=/bodyset/The_upper_leg translation=(0 1 0)
      PhysicalOffsetFrame The_lower_leg_offset: socket_parent=/bodyset/The_lower_leg translation=(0 -1.5 0)
          orientation=(0 0 1.570796) [radians]
    PinJoint bladeJoint: socket_parent_frame=The_lower_leg_offset socket_child_frame=TheBlade_offset
      Coordinate bladeangle: range=(0 1.570796)
      PhysicalOffsetFrame The_lower_leg_offset: socket_parent=/bodyset/The_lower_leg translation=(0 1.5 0)
      PhysicalOffsetFrame TheBlade_offset: socket_parent=/bodyset/TheBlade translation=(0 0 0)
  ForceSet:
    CoordinateActuator bJ_act_3: coordinate=bJoint_3
    CoordinateActuator bJ_act_4: coordinate=bJoint_4
    CoordinateActuator baseact: coordinate=baseangle
    Millard2012EquilibriumMuscle vastus: min_control=0.01 max_control=1 max_isometric_force=150000
        optimal_fiber_length=2.3 tendon_slack_length=0.3
      PathPoint origin: The_upper_leg (-0.1 0 0)
      PathPoint insertion: The_lower_leg (-0.1 0 0)
      PathWrap: wrap_object=patella method=hybrid
      ActiveForceLengthCurve: minimum_value=0
      ForceVelocityCurve: concentric_slope_at_vmax=0 concentric_slope_near_vmax=0.25 isometric_slope=5
          eccentric_slope_at_vmax=0 eccentric_slope_near_vmax=0.15 max_eccentric_velocity_force_multiplier=1.4
      FiberForceLengthCurve
      TendonForceLengthCurve
    Millard2012EquilibriumMuscle backside: min_control=0.01 max_control=1 max_isometric_force=100000
        optimal_fiber_length=1.2 tendon_slack_length=0.2
      PathPoint origin2: The_upper_leg (0.1 0.5 0)
      PathPoint insertion2: The_lower_leg (0.1 0 0)
      ActiveForceLengthCurve: minimum_value=0
      ForceVelocityCurve: concentric_slope_at_vmax=0 concentric_slope_near_vmax=0.25 isometric_slope=5
          eccentric_slope_at_vmax=0 eccentric_slope_near_vmax=0.15 max_eccentric_velocity_force_multiplier=1.4
      FiberForceLengthCurve
      TendonForceLengthCurve
    CoordinateActuator bladeact: coordinate=bladeangle
    ElasticFoundationForce Course: transition_velocity=0.002
      ContactParametersSet contact_parameters:
        ContactParameters: geometry=(bootje baantje) stiffness=1000000 dissipation=0.1 static_friction=0.001
            dynamic_friction=0.001 viscous_friction=0.001
    ElasticFoundationForce Blad: transition_velocity=0.1
      ContactParametersSet contact_parameters:
        ContactParameters: geometry=(bladje baantje) stiffness=50000 dissipation=1 static_friction=0.1
            dynamic_friction=0.1 viscous_friction=0.4
  MarkerSet:
    Marker mbladej: The_lower_leg (0 1.5 0)
    Marker mend: TheBlade (0 0.225 0)
  ContactGeometrySet:
    ContactHalfSpace baantje: socket_frame=/ground location=(0 0 0) orientation=(0 0 -1.570796)
    ContactMesh bootje: socket_frame=/bodyset/TheBoat location=(0 0 0) orientation=(1.570796 0 0)
        filename=box6_0.6_0.2.stl
    ContactMesh bladje: socket_frame=/bodyset/TheBlade location=(0 0 0) orientation=(0 -1.570796 0)
        filename=box0.05_0.45_0.45.stl
