# OpenSim document version 40000
CMCTool Pusher:
  defaults: CMC_Joint default: on=false weight=(1000 1 1) wrt_body=-1 express_body=-1 active=(true false false)
      kp=(100 1 1) kv=(20 1 1) ka=(1 1 1) r0=(0 0 0) r1=(0 0 0) r2=(0 0 0) limit=0
  CMC_Joint baseangle: weight=(100000 1 1) coordinate=baseangle
  CMC_Joint vastus: weight=(10000 1 1) coordinate=kneeangle
  CMC_Joint backside: weight=(10000 1 1) coordinate=kneeangle
  CMC_Joint bladeangle: weight=(10000 1 1) coordinate=bladeangle
