# OpenSim document version 40000
CMCTool CMC_row_subject:
  model_file: Pusher.osim
  replace_force_set: false
  results_directory: ResultsCMC
  output_precision: 8
  initial_time: 0.02
  final_time: 20
  solve_for_equilibrium_for_auxiliary_states: true
  maximum_number_of_integrator_steps: 20000
  maximum_integrator_step_size: 1
  minimum_integrator_step_size: 1e-8
  integrator_error_tolerance: 1e-5
  desired_kinematics_file: trajectory.mot
  task_set_file: push_CMC_Tasks.xml
  lowpass_cutoff_frequency: -1
  cmc_time_window: 0.01
  use_fast_optimization_target: false
  optimizer_algorithm: ipopt
  numerical_derivative_step_size: 1e-5
  optimization_convergence_tolerance: 1e-5
  optimizer_max_iterations: 1000
  optimizer_print_level: 0
  use_verbose_printing: false
  AnalysisSet Analyses:
    ProbeReporter MetabolicsReporter
