# OpenSim document version 30000
InverseKinematicsTool eerstetest:
  model_file: Pusher.osim
  accuracy: 1e-5
  marker_file: trajectory.trc
  time_range: 0 20
  output_motion_file: trajectory.mot
  IKTaskSet push_IK:
    IKMarkerTask mbasej: weight=1
    IKMarkerTask mbladej: weight=1
    IKMarkerTask mend: weight=1
    IKCoordinateTask boatJoint_coord_0: weight=100000 value=0
    IKCoordinateTask boatJoint_coord_1: weight=100000 value=0
    IKCoordinateTask boatJoint_coord_2: weight=100000 value=123
    IKCoordinateTask boatJoint_coord_3: weight=100000 value=0
    IKCoordinateTask boatJoint_coord_4: weight=100000 value=0
    IKCoordinateTask boatJoint_coord_5: weight=100000 value=0
