# OpenSim document version 20302
ControlSet Control Set:
  defaults: ControlLinear default: is_model_control=true extrapolate=true default_min=-1000000 default_max=1000000
      filter_on=false use_steps=true kp=100 kv=20
  ControlLinear act_1.excitation: is_model_control=true extrapolate=true default_min=-1000000 default_max=1000000
      filter_on=false use_steps=true kp=100 kv=20
  ControlLinear act_2.excitation: is_model_control=true extrapolate=true default_min=-1000000 default_max=1000000
      filter_on=false use_steps=true kp=100 kv=20
  ControlLinear act_3.excitation: is_model_control=true extrapolate=true default_min=-1000000 default_max=1000000
      filter_on=false use_steps=true kp=100 kv=20
