# OpenSim document version 40000
Model Pusher:
  gravity: 0 -9.90665 0
  ConsoleReporter__double_ reporter: report_time_interval=1 [s]
  Ground
  BodySet:
    Body The_upper_leg: mass=1 [kg] mass_center=(0 0 0) inertia=(0.00125 3.000625 3.000625 0 0 0)
      Cylinder The_upper_leg_geom_1: radius=0.1 half_height=1
    Body The_lower_leg: mass=1 mass_center=(0 0 0) inertia=(0.00125 3.000625 3.000625 0 0 0)
      Cylinder The_lower_leg_geom_1: radius=0.1 half_height=1.5
    Body TheBlade: mass=1 inertia=(1 1 1 0 0 0)
      Brick TheBlade_geom_1: half_lengths=(0.03 0.6 0.6)
  JointSet:
    PinJoint baseJoint: socket_parent_frame=ground_offset socket_child_frame=The_upper_leg_offset
      Coordinate baseangle: range=(-1.4 1)
      PhysicalOffsetFrame ground_offset: socket_parent=/ground translation=(5 0.525 0) [meters]
      PhysicalOffsetFrame The_upper_leg_offset: socket_parent=/bodyset/The_upper_leg translation=(0 -1 0)
    PinJoint lowerJoint: socket_parent_frame=The_upper_leg_offset socket_child_frame=The_lower_leg_offset
      Coordinate kneeangle: range=(-1.2 1.570796)
      PhysicalOffsetFrame The_upper_leg_offset: socket_parent=/bodyset/The_upper_leg translation=(0 1 0)
      PhysicalOffsetFrame The_lower_leg_offset: socket_parent=/bodyset/The_lower_leg translation=(0 -1.5 0)
          orientation=(0 0 1.570796) [radians]
    PinJoint bladeJoint: socket_parent_frame=The_lower_leg_offset socket_child_frame=TheBlade_offset
      Coordinate bladeangle: range=(0 1.570796)
      PhysicalOffsetFrame The_lower_leg_offset: socket_parent=/bodyset/The_lower_leg translation=(0 1.5 0)
      PhysicalOffsetFrame TheBlade_offset: socket_parent=/bodyset/TheBlade translation=(0 0 0)
  ControllerSet:
    PrescribedController: actuator_list=(act_1 act_2 act_3)
      FunctionSet ControlFunctions: Constant(value=0) Constant(value=0) Constant(value=0)
  ForceSet:
    CoordinateActuator act_1: coordinate=baseangle
    CoordinateActuator act_2: coordinate=kneeangle
    CoordinateActuator act_3: coordinate=bladeangle
  MarkerSet:
    Marker mbasej: ground (5 0.525 0)
    Marker mbladej: The_lower_leg (0 1.5 0)
    Marker mend: TheBlade (0 0.6 0)
