# OpenSim document version 30000
InverseKinematicsTool eerstetest:
  model_file: Pusher.osim
  constraint_weight: 20
  accuracy: 1e-5
  marker_file: trajectory.trc
  time_range: 0 10
  output_motion_file: trajectory.mot
  IKTaskSet push_IK:
    IKMarkerTask mbasej: apply=true weight=1
    IKMarkerTask mbladej: apply=true weight=1
    IKMarkerTask mend: apply=true weight=1
    # locked werkt niet
